# OpenSim document version 40000
Model Rajagopal_scaled:
  gravity: 0 -9.80665 0
  length_units: meters
  force_units: N
  Ground
  BodySet:
    Body pelvis: mass=13.45014 [kg] mass_center=(-0.07711577 0 0) inertia=(0.1174046 0.09947415 0.06612575 0 0 0)
        meshes=(r_pelvis.vtp l_pelvis.vtp sacrum.vtp)
      WrapCylinder Gmax1_at_pelvis_r: xyz_body_rotation=(-0.6 0.45 0) translation=(-0.08398747 -0.1056607 0.08945343)
          quadrant=-x radius=0.04707415 length=0.1959933
      WrapCylinder Gmax2_at_pelvis_r: xyz_body_rotation=(-0.75 0.39 0) translation=(-0.08725971 -0.08858425 0.09971858)
          quadrant=all radius=0.04782529 length=0.1268703
      WrapCylinder Gmax3_at_pelvis_r: xyz_body_rotation=(-0.1 0 0) translation=(-0.09053195 -0.09392065 0.09971858)
          quadrant=all radius=0.04325477 length=0.1463009
      WrapCylinder Gmax1_at_pelvis_l: xyz_body_rotation=(0.6 -0.45 0) translation=(-0.08398747 -0.1056607 -0.08945343)
          quadrant=-x radius=0.04707415 length=0.1959933
      WrapCylinder Gmax2_at_pelvis_l: xyz_body_rotation=(0.75 -0.39 0)
          translation=(-0.08725971 -0.08858425 -0.09971858) quadrant=all radius=0.04782529 length=0.1268703
      WrapCylinder Gmax3_at_pelvis_l: xyz_body_rotation=(0.1 0 0) translation=(-0.09053195 -0.09392065 -0.09971858)
          quadrant=all radius=0.04325477 length=0.1463009
      WrapCylinder PS_at_brim_r: xyz_body_rotation=(-0.25 -0.27 0.1) translation=(-0.08071523 -0.06403681 0.0961991)
          quadrant=-y radius=0.05539179 length=0.1422892
      WrapCylinder PS_at_brim_l: xyz_body_rotation=(0.25 0.27 0.1) translation=(-0.08071523 -0.06403681 -0.0961991)
          quadrant=-y radius=0.05539179 length=0.1422892
      WrapCylinder IL_at_brim_r: xyz_body_rotation=(-0.32 -0.24 0.9) translation=(-0.07744299 -0.06937321 0.1108636)
          quadrant=-y radius=0.06107923 length=0.1414838
      WrapCylinder IL_at_brim_l: xyz_body_rotation=(0.32 0.24 0.9) translation=(-0.07744299 -0.06937321 -0.1108636)
          quadrant=-y radius=0.06107923 length=0.1414838
    Body femur_r: mass=10.62283 mass_center=(0 -0.1871379 0) inertia=(0.1529229 0.0400866 0.16126 0 0 0)
        meshes=r_femur.vtp
      WrapCylinder Gastroc_at_condyles_r: translation=(0.005760171 -0.4513325 0) quadrant=all radius=0.02816057
          length=0.1152034
      WrapCylinder KnExt_at_fem_r: xyz_body_rotation=(-0.0623366 0.0507601 0)
          translation=(0.004133821 -0.4433318 0.00240903) quadrant=all radius=0.0281631 length=0.115184
      WrapCylinder AB_at_femshaft_r: xyz_body_rotation=(1.66157 0.186644 0)
          translation=(0.0168697 -0.1239458 0.02691728) quadrant=all radius=0.01899105 length=0.07721206
      WrapCylinder AL_at_femshaft_r: xyz_body_rotation=(1.77711 0.136489 0)
          translation=(0.03540512 -0.255288 0.0174115) quadrant=all radius=0.02312581 length=0.1103936
      WrapCylinder AMprox_at_femshaft_r: xyz_body_rotation=(1.61126 0.18656 0)
          translation=(0.005970982 -0.0802434 0.02926513) quadrant=all radius=0.0242889 length=0.07718868
      WrapCylinder AMmid_at_femshaft_r: xyz_body_rotation=(1.61139 0.13656 0)
          translation=(0.02651119 -0.1769124 0.0237137) quadrant=all radius=0.02464273 length=0.132224
      WrapCylinder AMdist_at_femshaft_r: xyz_body_rotation=(1.71188 0.186636 0)
          translation=(0.03641177 -0.2870211 0.01078834) quadrant=all radius=0.02508511 length=0.2207226
      WrapCylinder AMisch_at_condyles_r: xyz_body_rotation=(1.71115 -0.463363 0)
          translation=(-0.02609484 -0.4148197 -0.003633942) quadrant=all radius=0.04586472 length=0.2668909
      WrapCylinder PECT_at_femshaft_r: xyz_body_rotation=(1.81295 0.276344 0)
          translation=(0.007010969 -0.09302172 0.0350685) quadrant=all radius=0.01723249 length=0.05537411
    Body tibia_r: mass=4.234218 mass_center=(0 -0.2222977 0) inertia=(0.05756024 0.005824548 0.05835969 0 0 0)
        meshes=(r_tibia.vtp r_fibula.vtp)
      WrapCylinder GasLat_at_shank_r: xyz_body_rotation=(2.96723 -0.279725 -1.47812)
          translation=(-0.007309818 -0.08810942 -0.003259784) quadrant=-y radius=0.0597854 length=0.09940126
      WrapCylinder GasMed_at_shank_r: xyz_body_rotation=(2.96723 0.0279725 -1.47812)
          translation=(-0.007309818 -0.08810942 -0.003259784) quadrant=-y radius=0.05976197 length=0.09945171
      WrapCylinder GR_at_condyles_r: xyz_body_rotation=(0 -0.4 0) translation=(-0.00296344 -0.02381336 0) quadrant=all
          radius=0.03921266 length=0.09878133
      WrapCylinder SM_at_condyles_r: xyz_body_rotation=(0 -0.1 0) translation=(-0.0009878133 -0.02381336 0)
          quadrant=all radius=0.03834127 length=0.09878133
      WrapCylinder ST_at_condyles_r: xyz_body_rotation=(0 -0.2 0) translation=(-0.001975627 -0.02440869 0) quadrant=all
          radius=0.04629272 length=0.09878133
      WrapCylinder BF_at_gastroc_r: translation=(-0.05729317 -0.07144007 0) quadrant=y radius=0.03267722
          length=0.148172
    Body patella_r: mass=0.09844629 mass_center=(0.002073662 0.0304137 0)
        inertia=(4.350155e-6 1.987127e-5 1.987127e-5 0 0 0) meshes=r_patella.vtp
    Body talus_r: mass=0.1142068 mass_center=(0 0 0) inertia=(0.001142068 0.001142068 0.001142068 0 0 0)
        meshes=r_talus.vtp
    Body calcn_r: mass=1.427585 mass_center=(0.109854 0.03 0) inertia=(0.001598896 0.004454066 0.00468248 0 0 0)
        meshes=r_foot.vtp
    Body toes_r: mass=0.247372 mass_center=(0.03800948 0.006 -0.01728673)
        inertia=(0.0001142068 0.0002284137 0.001142068 0 0 0) meshes=r_bofoot.vtp
    Body femur_l: mass=10.62283 mass_center=(0 -0.18962 0) inertia=(0.1529229 0.0400866 0.16126 0 0 0)
        meshes=l_femur.vtp
      WrapCylinder Gastroc_at_condyles_l: translation=(0.005774273 -0.4573187 0) quadrant=all radius=0.02837833
          length=0.1154855
      WrapCylinder KnExt_at_fem_l: xyz_body_rotation=(0.0623366 -0.0507601 0)
          translation=(0.004143942 -0.4492119 -0.002414928) quadrant=all radius=0.02838027 length=0.1154704
      WrapCylinder AB_at_femshaft_l: xyz_body_rotation=(-1.66157 -0.186644 0)
          translation=(0.016911 -0.1255898 -0.02698318) quadrant=all radius=0.01904154 length=0.07819776
      WrapCylinder AL_at_femshaft_l: xyz_body_rotation=(-1.77711 -0.136489 0)
          translation=(0.0354918 -0.258674 -0.01745413) quadrant=all radius=0.0231893 length=0.1117805
      WrapCylinder AMprox_at_femshaft_l: xyz_body_rotation=(-1.61126 -0.18656 0)
          translation=(0.0059856 -0.0813077 -0.02933677) quadrant=all radius=0.02435271 length=0.07817985
      WrapCylinder AMmid_at_femshaft_l: xyz_body_rotation=(-1.61139 -0.13656 0)
          translation=(0.02657609 -0.1792589 -0.02377176) quadrant=all radius=0.02470553 length=0.1339464
      WrapCylinder AMdist_at_femshaft_l: xyz_body_rotation=(-1.71188 -0.186636 0)
          translation=(0.03650091 -0.2908279 -0.01081475) quadrant=all radius=0.0251532 length=0.2235116
      WrapCylinder AMisch_at_condyles_l: xyz_body_rotation=(-1.71115 0.463363 0)
          translation=(-0.02615873 -0.4203216 0.003642839) quadrant=all radius=0.04602663 length=0.2697662
      WrapCylinder PECT_at_femshaft_l: xyz_body_rotation=(-1.81295 -0.276344 0)
          translation=(0.007028133 -0.09425551 -0.03515435) quadrant=all radius=0.01728566 length=0.05602621
    Body tibia_l: mass=4.234218 mass_center=(0 -0.2152121 0) inertia=(0.05756024 0.005824548 0.05835969 0 0 0)
        meshes=(l_tibia.vtp l_fibula.vtp)
      WrapCylinder GasLat_at_shank_l: xyz_body_rotation=(-2.96723 0.279725 -1.47812)
          translation=(-0.007243689 -0.08530098 0.003230294) quadrant=-y radius=0.05851018 length=0.0984125
      WrapCylinder GasMed_at_shank_l: xyz_body_rotation=(-2.96723 -0.0279725 -1.47812)
          translation=(-0.007243689 -0.08530098 0.003230294) quadrant=-y radius=0.05849127 length=0.09845523
      WrapCylinder GR_at_condyles_l: xyz_body_rotation=(0 0.4 0) translation=(-0.002936631 -0.02305432 0) quadrant=all
          radius=0.03836867 length=0.09788769
      WrapCylinder SM_at_condyles_l: xyz_body_rotation=(0 0.1 0) translation=(-0.0009788769 -0.02305432 0) quadrant=all
          radius=0.03751604 length=0.09788769
      WrapCylinder ST_at_condyles_l: xyz_body_rotation=(0 0.2 0) translation=(-0.001957754 -0.02363068 0) quadrant=all
          radius=0.04529635 length=0.09788769
      WrapCylinder BF_at_gastroc_l: translation=(-0.05677486 -0.06916296 0) quadrant=all radius=0.03197389
          length=0.1468315
    Body patella_l: mass=0.09844629 mass_center=(0.002078738 0.03048816 0)
        inertia=(4.371481e-6 1.996868e-5 1.996868e-5 0 0 0) meshes=l_patella.vtp
    Body talus_l: mass=0.1142068 mass_center=(0 0 0) inertia=(0.001142068 0.001142068 0.001142068 0 0 0)
        meshes=l_talus.vtp
    Body calcn_l: mass=1.427585 mass_center=(0.1163774 0.03 0) inertia=(0.001598896 0.004454066 0.00468248 0 0 0)
        meshes=l_foot.vtp
    Body toes_l: mass=0.247372 mass_center=(0.04026657 0.006 0.01713035)
        inertia=(0.0001142068 0.0002284137 0.001142068 0 0 0) meshes=l_bofoot.vtp
    Body torso: mass=39.10054 mass_center=(-0.03721551 0.3281443 0) inertia=(1.68398 0.8628326 1.634757 0 0 0)
        meshes=(hat_spine.vtp hat_jaw.vtp hat_skull.vtp hat_ribs_scap.vtp)
  JointSet:
    CustomJoint ground_pelvis: socket_parent_frame=ground_offset socket_child_frame=pelvis_offset
      Coordinate pelvis_tilt: default_value=0 range=(-1.570796 1.570796) clamped=true
      Coordinate pelvis_list: default_value=0 range=(-1.570796 1.570796) clamped=true
      Coordinate pelvis_rotation: default_value=0 range=(-1.570796 1.570796) clamped=true
      Coordinate pelvis_tx: default_value=0 range=(-5 5) clamped=true
      Coordinate pelvis_ty: default_value=0.93 range=(-1 2) clamped=true
      Coordinate pelvis_tz: default_value=0 range=(-3 3) clamped=true
      PhysicalOffsetFrame ground_offset: socket_parent=/ground translation=(0 0 0) [meters]
      PhysicalOffsetFrame pelvis_offset: socket_parent=/bodyset/pelvis translation=(0 0 0)
      SpatialTransform:
        TransformAxis rotation1: coordinates=pelvis_tilt axis=(0 0 1) LinearFunction(coefficients=1 0)
        TransformAxis rotation2: coordinates=pelvis_list axis=(1 0 0) LinearFunction(coefficients=1 0)
        TransformAxis rotation3: coordinates=pelvis_rotation axis=(0 1 0) LinearFunction(coefficients=1 0)
        TransformAxis translation1: coordinates=pelvis_tx axis=(1 0 0) LinearFunction(coefficients=1 0)
        TransformAxis translation2: coordinates=pelvis_ty axis=(0 1 0) LinearFunction(coefficients=1 0)
        TransformAxis translation3: coordinates=pelvis_tz axis=(0 0 1) LinearFunction(coefficients=1 0)
    CustomJoint hip_r: socket_parent_frame=pelvis_offset socket_child_frame=femur_r_offset
      Coordinate hip_flexion_r: default_value=0 range=(-0.5235988 2.094395) clamped=true
      Coordinate hip_adduction_r: default_value=0 range=(-0.8726646 0.5235988) clamped=true
      Coordinate hip_rotation_r: default_value=0 range=(-0.6981317 0.6981317) clamped=true
      PhysicalOffsetFrame pelvis_offset: socket_parent=/bodyset/pelvis translation=(-0.06138284 -0.08377082 0.1132979)
      PhysicalOffsetFrame femur_r_offset: socket_parent=/bodyset/femur_r translation=(0 0 0)
      SpatialTransform: axes_held_at_zero=(translation1 translation2 translation3)
        TransformAxis rotation1: coordinates=hip_flexion_r axis=(0 0 1) LinearFunction(coefficients=1 0)
        TransformAxis rotation2: coordinates=hip_adduction_r axis=(1 0 0) LinearFunction(coefficients=1 0)
        TransformAxis rotation3: coordinates=hip_rotation_r axis=(0 1 0) LinearFunction(coefficients=1 0)
    CustomJoint walker_knee_r: socket_parent_frame=femur_r_offset socket_child_frame=tibia_r_offset
      Coordinate knee_angle_r: default_value=0 range=(0 2.0944) clamped=true
      PhysicalOffsetFrame femur_r_offset: socket_parent=/bodyset/femur_r
          translation=(-0.009319957 -0.4490869 -0.003168094) orientation=(-1.64157 1.44618 1.5708) [radians]
      PhysicalOffsetFrame tibia_r_offset: socket_parent=/bodyset/tibia_r
          translation=(-0.007990955 -0.004208773 -0.001466646) orientation=(-1.64157 1.44618 1.5708)
      SpatialTransform: axes_held_at_zero=translation3
        TransformAxis rotation1: coordinates=knee_angle_r axis=(1 0 0) LinearFunction(coefficients=1 0)
        TransformAxis rotation2: coordinates=knee_angle_r axis=(0 0 1)
          SimmSpline: x=(0 0.174533 0.349066 0.523599 0.698132 0.872665 1.0472 1.22173 1.39626 1.5708 1.74533 1.91986 2.0944)
              y=(0 0.0126809 0.0226969 0.0296054 0.0332049 0.0335354 0.0308779 0.0257548 0.0189295 0.011407 0.00443314 -0.00050475 -0.0016782)
        TransformAxis rotation3: coordinates=knee_angle_r axis=(0 1 0)
          SimmSpline: x=(0 0.174533 0.349066 0.523599 0.698132 0.872665 1.0472 1.22173 1.39626 1.5708 1.74533 1.91986 2.0944)
              y=(0 0.059461 0.109399 0.150618 0.18392 0.210107 0.229983 0.24435 0.254012 0.25977 0.262428 0.262788 0.261654)
        TransformAxis translation1: coordinates=knee_angle_r axis=(0 1 0)
          MultiplierFunction: scale=1.100811
            SimmSpline: x=(0 0.174533 0.349066 0.523599 0.698132 0.872665 1.0472 1.22173 1.39626 1.5708 1.74533 1.91986 2.0944)
                y=(0 0.000479 0.000835 0.001086 0.001251 0.001346 0.001391 0.001403 0.0014 0.0014 0.001421 0.001481 0.001599)
        TransformAxis translation2: coordinates=knee_angle_r axis=(0 0 1)
          MultiplierFunction: scale=1.152034
            SimmSpline: x=(0 0.174533 0.349066 0.523599 0.698132 0.872665 1.0472 1.22173 1.39626 1.5708 1.74533 1.91986 2.0944)
                y=(0 0.000988 0.001899 0.002734 0.003492 0.004173 0.004777 0.005305 0.005756 0.00613 0.006427 0.006648 0.006792)
    CustomJoint patellofemoral_r: socket_parent_frame=femur_r_offset socket_child_frame=patella_r_offset
      Coordinate knee_angle_r_beta: default_value=0 range=(-99999.9 99999.9) clamped=false
      PhysicalOffsetFrame femur_r_offset: socket_parent=/bodyset/femur_r
          translation=(-0.009319957 -0.4490869 -0.003168094)
      PhysicalOffsetFrame patella_r_offset: socket_parent=/bodyset/patella_r translation=(0 0 0)
      SpatialTransform: axes_held_at_zero=(rotation2 rotation3)
        TransformAxis rotation1: coordinates=knee_angle_r_beta axis=(0 0 1)
          SimmSpline: x=(0 0.174533 0.349066 0.523599 0.698132 0.872665 1.0472 1.22173 1.39626 1.5708 1.74533 1.91986 2.0944)
              y=(0.00113686 -0.00629212 -0.105582 -0.253683 -0.414245 -0.579047 -0.747244 -0.91799 -1.09044 -1.26379 -1.43763 -1.61186 -1.78634)
        TransformAxis translation1: coordinates=knee_angle_r_beta axis=(1 0 0)
          MultiplierFunction: scale=1.152034
            SimmSpline: x=(0 0.174533 0.349066 0.523599 0.698132 0.872665 1.0472 1.22173 1.39626 1.5708 1.74533 1.91986 2.0944)
                y=(0.0524 0.0488 0.0437 0.0371 0.0296 0.0216 0.0136 0.0057 -0.0019 -0.0088 -0.0148 -0.0196 -0.0227)
        TransformAxis translation2: coordinates=knee_angle_r_beta axis=(0 1 0)
          MultiplierFunction: scale=1.100811
            SimmSpline: x=(0 0.174533 0.349066 0.523599 0.698132 0.872665 1.0472 1.22173 1.39626 1.5708 1.74533 1.91986 2.0944)
                y=(-0.0108 -0.019 -0.0263 -0.0322 -0.0367 -0.0395 -0.0408 -0.0404 -0.0384 -0.0349 -0.0301 -0.0245 -0.0187)
        TransformAxis translation3: axis=(0 0 1) MultiplierFunction(scale=1.152034, Constant(value=0.00275))
    PinJoint ankle_r: socket_parent_frame=tibia_r_offset socket_child_frame=talus_r_offset
      Coordinate ankle_angle_r: default_value=0 range=(-0.6981317 0.5235988) clamped=true
      PhysicalOffsetFrame tibia_r_offset: socket_parent=/bodyset/tibia_r translation=(-0.009878133 -0.4762671 0)
          orientation=(0.175895 -0.105208 0.0186622)
      PhysicalOffsetFrame talus_r_offset: socket_parent=/bodyset/talus_r translation=(0 0 0)
          orientation=(0.175895 -0.105208 0.0186622)
    PinJoint subtalar_r: socket_parent_frame=talus_r_offset socket_child_frame=calcn_r_offset
      Coordinate subtalar_angle_r: default_value=0 range=(-0.3490659 0.3490659) clamped=true
      PhysicalOffsetFrame talus_r_offset: socket_parent=/bodyset/talus_r translation=(-0.05357579 -0.04195 0.007823481)
          orientation=(-1.76819 0.906223 1.8196)
      PhysicalOffsetFrame calcn_r_offset: socket_parent=/bodyset/calcn_r translation=(0 0 0)
          orientation=(-1.76819 0.906223 1.8196)
    PinJoint mtp_r: socket_parent_frame=calcn_r_offset socket_child_frame=toes_r_offset
      Coordinate mtp_angle_r: default_value=0 range=(-0.5235988 0.5235988) clamped=true locked=true
      PhysicalOffsetFrame calcn_r_offset: socket_parent=/bodyset/calcn_r translation=(0.1964189 -0.002 0.001066838)
          orientation=(-3.14159 0.619901 0)
      PhysicalOffsetFrame toes_r_offset: socket_parent=/bodyset/toes_r translation=(0 0 0)
          orientation=(-3.14159 0.619901 0)
    CustomJoint hip_l: socket_parent_frame=pelvis_offset socket_child_frame=femur_l_offset
      Coordinate hip_flexion_l: default_value=0 range=(-0.5235988 2.094395) clamped=true
      Coordinate hip_adduction_l: default_value=0 range=(-0.8726646 0.5235988) clamped=true
      Coordinate hip_rotation_l: default_value=0 range=(-0.6981317 0.6981317) clamped=true
      PhysicalOffsetFrame pelvis_offset: socket_parent=/bodyset/pelvis translation=(-0.06138284 -0.08377082 -0.1132979)
      PhysicalOffsetFrame femur_l_offset: socket_parent=/bodyset/femur_l translation=(0 0 0)
      SpatialTransform: axes_held_at_zero=(translation1 translation2 translation3)
        TransformAxis rotation1: coordinates=hip_flexion_l axis=(0 0 1) LinearFunction(coefficients=1 0)
        TransformAxis rotation2: coordinates=hip_adduction_l axis=(1 0 0) LinearFunction(coefficients=-1 0)
        TransformAxis rotation3: coordinates=hip_rotation_l axis=(0 1 0) LinearFunction(coefficients=-1 0)
    CustomJoint walker_knee_l: socket_parent_frame=femur_l_offset socket_child_frame=tibia_l_offset
      Coordinate knee_angle_l: default_value=0 range=(0 2.0944) clamped=true
      PhysicalOffsetFrame femur_l_offset: socket_parent=/bodyset/femur_l
          translation=(-0.009342773 -0.4550433 0.00317585) orientation=(1.64157 -1.44618 1.5708)
      PhysicalOffsetFrame tibia_l_offset: socket_parent=/bodyset/tibia_l
          translation=(-0.007918664 -0.004074621 0.001453378) orientation=(1.64157 -1.44618 1.5708)
      SpatialTransform: axes_held_at_zero=translation3
        TransformAxis rotation1: coordinates=knee_angle_l axis=(-1 0 0) LinearFunction(coefficients=1 0)
        TransformAxis rotation2: coordinates=knee_angle_l axis=(0 0 1)
          SimmSpline: x=(0 0.174533 0.349066 0.523599 0.698132 0.872665 1.0472 1.22173 1.39626 1.5708 1.74533 1.91986 2.0944)
              y=(0 0.0126809 0.0226969 0.0296054 0.0332049 0.0335354 0.0308779 0.0257548 0.0189295 0.011407 0.00443314 -0.00050475 -0.0016782)
        TransformAxis rotation3: coordinates=knee_angle_l axis=(0 1 0)
          SimmSpline: x=(0 0.174533 0.349066 0.523599 0.698132 0.872665 1.0472 1.22173 1.39626 1.5708 1.74533 1.91986 2.0944)
              y=(0 -0.059461 -0.109399 -0.150618 -0.18392 -0.210107 -0.229983 -0.24435 -0.254012 -0.25977 -0.262428 -0.262788 -0.261654)
        TransformAxis translation1: coordinates=knee_angle_l axis=(0 1 0)
          MultiplierFunction: scale=1.115412
            SimmSpline: x=(0 0.174533 0.349066 0.523599 0.698132 0.872665 1.0472 1.22173 1.39626 1.5708 1.74533 1.91986 2.0944)
                y=(0 0.000479 0.000835 0.001086 0.001251 0.001346 0.001391 0.001403 0.0014 0.0014 0.001421 0.001481 0.001599)
        TransformAxis translation2: coordinates=knee_angle_l axis=(0 0 1)
          MultiplierFunction: scale=1.154855
            SimmSpline: x=(0 0.174533 0.349066 0.523599 0.698132 0.872665 1.0472 1.22173 1.39626 1.5708 1.74533 1.91986 2.0944)
                y=(0 -0.000988 -0.001899 -0.002734 -0.003492 -0.004173 -0.004777 -0.005305 -0.005756 -0.00613 -0.006427 -0.006648 -0.006792)
    CustomJoint patellofemoral_l: socket_parent_frame=femur_l_offset socket_child_frame=patella_l_offset
      Coordinate knee_angle_l_beta: default_value=0 range=(-99999.9 99999.9) clamped=false
      PhysicalOffsetFrame femur_l_offset: socket_parent=/bodyset/femur_l
          translation=(-0.009342773 -0.4550433 0.00317585)
      PhysicalOffsetFrame patella_l_offset: socket_parent=/bodyset/patella_l translation=(0 0 0)
      SpatialTransform: axes_held_at_zero=(rotation2 rotation3)
        TransformAxis rotation1: coordinates=knee_angle_l_beta axis=(0 0 1)
          SimmSpline: x=(0 0.174533 0.349066 0.523599 0.698132 0.872665 1.0472 1.22173 1.39626 1.5708 1.74533 1.91986 2.0944)
              y=(0.00113686 -0.00629212 -0.105582 -0.253683 -0.414245 -0.579047 -0.747244 -0.91799 -1.09044 -1.26379 -1.43763 -1.61186 -1.78634)
        TransformAxis translation1: coordinates=knee_angle_l_beta axis=(1 0 0)
          MultiplierFunction: scale=1.154855
            SimmSpline: x=(0 0.174533 0.349066 0.523599 0.698132 0.872665 1.0472 1.22173 1.39626 1.5708 1.74533 1.91986 2.0944)
                y=(0.0524 0.0488 0.0437 0.0371 0.0296 0.0216 0.0136 0.0057 -0.0019 -0.0088 -0.0148 -0.0196 -0.0227)
        TransformAxis translation2: coordinates=knee_angle_l_beta axis=(0 1 0)
          MultiplierFunction: scale=1.115412
            SimmSpline: x=(0 0.174533 0.349066 0.523599 0.698132 0.872665 1.0472 1.22173 1.39626 1.5708 1.74533 1.91986 2.0944)
                y=(-0.0108 -0.019 -0.0263 -0.0322 -0.0367 -0.0395 -0.0408 -0.0404 -0.0384 -0.0349 -0.0301 -0.0245 -0.0187)
        TransformAxis translation3: axis=(0 0 1) MultiplierFunction(scale=1.154855, Constant(value=-0.00275))
    PinJoint ankle_l: socket_parent_frame=tibia_l_offset socket_child_frame=talus_l_offset
      Coordinate ankle_angle_l: default_value=0 range=(-0.6981317 0.5235988) clamped=true
      PhysicalOffsetFrame tibia_l_offset: socket_parent=/bodyset/tibia_l translation=(-0.009788769 -0.4610864 0)
          orientation=(-0.175895 0.105208 0.0186622)
      PhysicalOffsetFrame talus_l_offset: socket_parent=/bodyset/talus_l translation=(0 0 0)
          orientation=(-0.175895 0.105208 0.0186622)
    PinJoint subtalar_l: socket_parent_frame=talus_l_offset socket_child_frame=calcn_l_offset
      Coordinate subtalar_angle_l: default_value=0 range=(-0.3490659 0.3490659) clamped=true
      PhysicalOffsetFrame talus_l_offset: socket_parent=/bodyset/talus_l
          translation=(-0.05675724 -0.04195 -0.007752705) orientation=(1.76819 -0.906223 1.8196)
      PhysicalOffsetFrame calcn_l_offset: socket_parent=/bodyset/calcn_l translation=(0 0 0)
          orientation=(1.76819 -0.906223 1.8196)
    PinJoint mtp_l: socket_parent_frame=calcn_l_offset socket_child_frame=toes_l_offset
      Coordinate mtp_angle_l: default_value=0 range=(-0.5235988 0.5235988) clamped=true locked=true
      PhysicalOffsetFrame calcn_l_offset: socket_parent=/bodyset/calcn_l translation=(0.2080827 -0.002 -0.001057187)
          orientation=(-3.14159 -0.619901 0)
      PhysicalOffsetFrame toes_l_offset: socket_parent=/bodyset/toes_l translation=(0 0 0)
          orientation=(-3.14159 -0.619901 0)
    CustomJoint back: socket_parent_frame=pelvis_offset socket_child_frame=torso_offset
      Coordinate lumbar_extension: default_value=0 range=(-1.570796 1.570796) clamped=true
      Coordinate lumbar_bending: default_value=0 range=(-1.570796 1.570796) clamped=true
      Coordinate lumbar_rotation: default_value=0 range=(-1.570796 1.570796) clamped=true
      PhysicalOffsetFrame pelvis_offset: socket_parent=/bodyset/pelvis translation=(-0.1098382 0.08698333 0)
      PhysicalOffsetFrame torso_offset: socket_parent=/bodyset/torso translation=(0 0 0)
      SpatialTransform: axes_held_at_zero=(translation1 translation2 translation3)
        TransformAxis rotation1: coordinates=lumbar_extension axis=(0 0 1) LinearFunction(coefficients=1 0)
        TransformAxis rotation2: coordinates=lumbar_bending axis=(1 0 0) LinearFunction(coefficients=1 0)
        TransformAxis rotation3: coordinates=lumbar_rotation axis=(0 1 0) LinearFunction(coefficients=1 0)
  ControllerSet:
    PrescribedController pelvis_tilt_controller: actuator_list=pelvis_tilt_reserve
      FunctionSet ControlFunctions: pelvis_tilt_constFxn=Constant(value=0)
    PrescribedController pelvis_list_controller: actuator_list=pelvis_list_reserve
      FunctionSet ControlFunctions: pelvis_list_constFxn=Constant(value=0)
    PrescribedController pelvis_rotation_controller: actuator_list=pelvis_rotation_reserve
      FunctionSet ControlFunctions: pelvis_rotation_constFxn=Constant(value=0)
    PrescribedController pelvis_tx_controller: actuator_list=pelvis_tx_reserve
      FunctionSet ControlFunctions: pelvis_tx_constFxn=Constant(value=0)
    PrescribedController pelvis_ty_controller: actuator_list=pelvis_ty_reserve
      FunctionSet ControlFunctions: pelvis_ty_constFxn=Constant(value=0)
    PrescribedController pelvis_tz_controller: actuator_list=pelvis_tz_reserve
      FunctionSet ControlFunctions: pelvis_tz_constFxn=Constant(value=0)
    PrescribedController hip_flexion_r_controller: actuator_list=hip_flexion_r_reserve
      FunctionSet ControlFunctions: hip_flexion_r_constFxn=Constant(value=0)
    PrescribedController hip_adduction_r_controller: actuator_list=hip_adduction_r_reserve
      FunctionSet ControlFunctions: hip_adduction_r_constFxn=Constant(value=0)
    PrescribedController hip_rotation_r_controller: actuator_list=hip_rotation_r_reserve
      FunctionSet ControlFunctions: hip_rotation_r_constFxn=Constant(value=0)
    PrescribedController knee_angle_r_controller: actuator_list=knee_angle_r_reserve
      FunctionSet ControlFunctions: knee_angle_r_constFxn=Constant(value=0)
    PrescribedController ankle_angle_r_controller: actuator_list=ankle_angle_r_reserve
      FunctionSet ControlFunctions: ankle_angle_r_constFxn=Constant(value=0)
    PrescribedController subtalar_angle_r_controller: actuator_list=subtalar_angle_r_reserve
      FunctionSet ControlFunctions: subtalar_angle_r_constFxn=Constant(value=0)
    PrescribedController hip_flexion_l_controller: actuator_list=hip_flexion_l_reserve
      FunctionSet ControlFunctions: hip_flexion_l_constFxn=Constant(value=0)
    PrescribedController hip_adduction_l_controller: actuator_list=hip_adduction_l_reserve
      FunctionSet ControlFunctions: hip_adduction_l_constFxn=Constant(value=0)
    PrescribedController hip_rotation_l_controller: actuator_list=hip_rotation_l_reserve
      FunctionSet ControlFunctions: hip_rotation_l_constFxn=Constant(value=0)
    PrescribedController knee_angle_l_controller: actuator_list=knee_angle_l_reserve
      FunctionSet ControlFunctions: knee_angle_l_constFxn=Constant(value=0)
    PrescribedController ankle_angle_l_controller: actuator_list=ankle_angle_l_reserve
      FunctionSet ControlFunctions: ankle_angle_l_constFxn=Constant(value=0)
    PrescribedController subtalar_angle_l_controller: actuator_list=subtalar_angle_l_reserve
      FunctionSet ControlFunctions: subtalar_angle_l_constFxn=Constant(value=0)
    PrescribedController lumbar_extension_controller: actuator_list=lumbar_extension_reserve
      FunctionSet ControlFunctions: lumbar_extension_constFxn=Constant(value=0)
    PrescribedController lumbar_bending_controller: actuator_list=lumbar_bending_reserve
      FunctionSet ControlFunctions: lumbar_bending_constFxn=Constant(value=0)
    PrescribedController lumbar_rotation_controller: actuator_list=lumbar_rotation_reserve
      FunctionSet ControlFunctions: lumbar_rotation_constFxn=Constant(value=0)
  ConstraintSet:
    CoordinateCouplerConstraint patellofemoral_knee_angle_r_con: independent_coordinate_names=knee_angle_r
        dependent_coordinate_name=knee_angle_r_beta scale_factor=1
        coupled_coordinates_function=LinearFunction(coefficients=1 0)
    CoordinateCouplerConstraint patellofemoral_knee_angle_l_con: independent_coordinate_names=knee_angle_l
        dependent_coordinate_name=knee_angle_l_beta scale_factor=1
        coupled_coordinates_function=LinearFunction(coefficients=1 0)
  ForceSet:
    Millard2012EquilibriumMuscle [values shared by the 80 below unless stated]: fiber_damping=0.01
        default_activation=0.01 minimum_activation=0.01
      ActiveForceLengthCurve: min_norm_active_fiber_length=0.25 transition_norm_fiber_length=0.77
          max_norm_active_fiber_length=1.9 shallow_ascending_slope=0.75 minimum_value=0
      ForceVelocityCurve: concentric_slope_at_vmax=0 concentric_slope_near_vmax=0.25 isometric_slope=5
          eccentric_slope_at_vmax=0 eccentric_slope_near_vmax=0.15 max_eccentric_velocity_force_multiplier=1.4
      TendonForceLengthCurve
    Millard2012EquilibriumMuscle addbrev_r: max_isometric_force=625.8197 optimal_fiber_length=0.1252433
        tendon_slack_length=0.04306414 pennation_angle_at_optimal=0.1147809 [radians]
      PathPoint P1: pelvis (-0.02083326 -0.1003243 0.02258333)
      PathPoint P2: femur_r (-0.002304068 -0.1298957 0.02868565)
      PathWrap: wrap_object=AB_at_femshaft_r method=hybrid
      FiberForceLengthCurve: strain_at_zero_force=-0.1927643 strain_at_one_norm_force=0.5015522
          stiffness_at_low_force=0.2 stiffness_at_one_norm_force=2.880531 curviness=0.75
    Millard2012EquilibriumMuscle addlong_r: max_isometric_force=916.8 optimal_fiber_length=0.1224854
        tendon_slack_length=0.1492005 pennation_angle_at_optimal=0.1377704
      PathPoint P1: pelvis (-0.008267857 -0.0948812 0.02768657)
      PathPoint P2: femur_r (0.01297191 -0.2635011 0.0182367)
      PathWrap: wrap_object=AL_at_femshaft_r method=hybrid
      FiberForceLengthCurve: strain_at_zero_force=-0.1917374 strain_at_one_norm_force=0.5002995
          stiffness_at_low_force=0.2 stiffness_at_one_norm_force=2.890019 curviness=0.75
    Millard2012EquilibriumMuscle addmagDist_r: max_isometric_force=597.2951 optimal_fiber_length=0.1996381
        tendon_slack_length=0.09844535 pennation_angle_at_optimal=0.194705
      PathPoint P1: pelvis (-0.08075886 -0.1362597 0.05839403)
      PathPoint P2: femur_r (0.01296038 -0.2889629 0.02223426)
      PathWrap: wrap_object=AMdist_at_femshaft_r method=hybrid
      FiberForceLengthCurve: strain_at_zero_force=-3.981963e-9 strain_at_one_norm_force=0.7 stiffness_at_low_force=0.2
          stiffness_at_one_norm_force=2.857143 curviness=0.75
    Millard2012EquilibriumMuscle addmagIsch_r: max_isometric_force=597.2951 optimal_fiber_length=0.1727717
        tendon_slack_length=0.2392955 pennation_angle_at_optimal=0.1680443
      PathPoint P1: pelvis (-0.09775269 -0.1384903 0.06116562)
      PathPoint P2: femur_r (0.005541285 -0.4270817 -0.03770608)
      PathWrap: wrap_object=AMisch_at_condyles_r method=hybrid
      FiberForceLengthCurve: strain_at_zero_force=0.007389956 strain_at_one_norm_force=0.7000392
          stiffness_at_low_force=0.2 stiffness_at_one_norm_force=2.887464 curviness=0.75
    Millard2012EquilibriumMuscle addmagMid_r: max_isometric_force=597.2951 optimal_fiber_length=0.1634397
        tendon_slack_length=0.05534364 pennation_angle_at_optimal=0.2073076
      PathPoint P1: pelvis (-0.0574387 -0.1288741 0.04185247)
      PathPoint P2: femur_r (0.002787923 -0.1787717 0.03366244)
      PathWrap: wrap_object=AMmid_at_femshaft_r method=hybrid
      FiberForceLengthCurve: strain_at_zero_force=-3.981963e-9 strain_at_one_norm_force=0.7 stiffness_at_low_force=0.2
          stiffness_at_one_norm_force=2.857143 curviness=0.75
    Millard2012EquilibriumMuscle addmagProx_r: max_isometric_force=597.2951 optimal_fiber_length=0.1357455
        tendon_slack_length=0.05183537 pennation_angle_at_optimal=0.3114833
      PathPoint P1: pelvis (-0.03379132 -0.114786 0.02001704)
      PathPoint P2: femur_r (-0.01759156 -0.08680996 0.03688814)
      PathWrap: wrap_object=AMprox_at_femshaft_r method=hybrid
      FiberForceLengthCurve: strain_at_zero_force=-3.981963e-9 strain_at_one_norm_force=0.7 stiffness_at_low_force=0.2
          stiffness_at_one_norm_force=2.857143 curviness=0.75
    Millard2012EquilibriumMuscle bflh_r: max_isometric_force=1313.184 optimal_fiber_length=0.1086237
        tendon_slack_length=0.3619604 pennation_angle_at_optimal=0.1759182
      PathPoint P1: pelvis (-0.1134376 -0.1271131 0.08593395)
      PathPoint P2: tibia_r (-0.03328931 -0.04167337 0.02499168)
      PathPoint P3: tibia_r (-0.02835024 -0.05417538 0.02993074)
      FiberForceLengthCurve: strain_at_zero_force=0.1965607 strain_at_one_norm_force=0.7068715
          stiffness_at_low_force=0.2 stiffness_at_one_norm_force=3.91918 curviness=0.75
    Millard2012EquilibriumMuscle bfsh_r: max_isometric_force=557.1148 optimal_fiber_length=0.1228333
        tendon_slack_length=0.1178411 pennation_angle_at_optimal=0.2642232
      PathPoint P1: femur_r (0.005760171 -0.2323812 0.0269576)
      PathPoint P2: tibia_r (-0.02973318 -0.04988898 0.03141246)
      PathWrap: wrap_object=BF_at_gastroc_r method=hybrid
      FiberForceLengthCurve: strain_at_zero_force=0.115251 strain_at_one_norm_force=0.6888986
          stiffness_at_low_force=0.2 stiffness_at_one_norm_force=3.486462 curviness=0.75
    Millard2012EquilibriumMuscle edl_r: max_isometric_force=603.4982 optimal_fiber_length=0.08001189
        tendon_slack_length=0.4258933 pennation_angle_at_optimal=0.2182582
      PathPoint P1: tibia_r (-0.01580501 -0.1377603 0.02025017)
      PathPoint P2: tibia_r (0.01620014 -0.4476911 0.01106351)
      PathPoint P3: calcn_r (0.1009558 0.036 0.0007902506)
      PathPoint P4: calcn_r (0.177524 0.0055 0.01284157)
      PathPoint P5: toes_r (0.0003295619 0.0047 0.01511354)
      PathPoint P6: toes_r (0.04866531 -0.0004 0.02469533)
      FiberForceLengthCurve: strain_at_zero_force=0.1317998 strain_at_one_norm_force=0.7072192
          stiffness_at_low_force=0.2 stiffness_at_one_norm_force=3.475726 curviness=0.75
    Millard2012EquilibriumMuscle ehl_r: max_isometric_force=285.8675 optimal_fiber_length=0.08594952
        tendon_slack_length=0.3755067 pennation_angle_at_optimal=0.1972681
      PathPoint P1: tibia_r (-0.01382939 -0.1845535 0.01866967)
      PathPoint P2: tibia_r (0.007013474 -0.3463653 0.01620014)
      PathPoint P3: tibia_r (0.01975627 -0.4397136 -0.002765877)
      PathPoint P4: calcn_r (0.1065584 0.0389 -0.02084286)
      PathPoint P5: calcn_r (0.1420412 0.0309 -0.0253868)
      PathPoint P6: calcn_r (0.1904868 0.0139 -0.02765877)
      PathPoint P7: toes_r (0.03273649 0.0041 -0.02420143)
      PathPoint P8: toes_r (0.06184779 0.0034 -0.01837333)
      FiberForceLengthCurve: strain_at_zero_force=0.1051406 strain_at_one_norm_force=0.7178208
          stiffness_at_low_force=0.2 stiffness_at_one_norm_force=3.264346 curviness=0.75
    Millard2012EquilibriumMuscle fdl_r: max_isometric_force=423.177 optimal_fiber_length=0.05061941
        tendon_slack_length=0.4298937 pennation_angle_at_optimal=0.2248391
      PathPoint P1: tibia_r (-0.002271971 -0.2181303 -0.001778064)
      PathPoint P2: tibia_r (-0.01738551 -0.4339984 -0.01224888)
      PathPoint P3: calcn_r (0.04789634 0.0315 -0.02765877)
      PathPoint P4: calcn_r (0.07777662 0.0176 -0.02597949)
      PathPoint P5: calcn_r (0.1821379 -0.0081 0.01145863)
      PathPoint P6: toes_r (-0.002087226 -0.0078 0.01452086)
      PathPoint P7: toes_r (0.03130838 -0.0071 0.02123799)
      PathPoint P8: toes_r (0.04844561 -0.006 0.02390508)
      FiberForceLengthCurve: strain_at_zero_force=-0.01205975 strain_at_one_norm_force=0.6997089
          stiffness_at_low_force=0.2 stiffness_at_one_norm_force=2.809902 curviness=0.75
    Millard2012EquilibriumMuscle fhl_r: max_isometric_force=907.8393 optimal_fiber_length=0.05964695
        tendon_slack_length=0.401049 pennation_angle_at_optimal=0.2580255
      PathPoint P1: tibia_r (-0.03062221 -0.2575414 0.01975627)
      PathPoint P2: tibia_r (-0.02390508 -0.4370941 -0.007507381)
      PathPoint P3: calcn_r (0.04108539 0.0276 -0.0238063)
      PathPoint P4: calcn_r (0.1140284 0.0068 -0.02528802)
      PathPoint P5: calcn_r (0.189608 -0.0053 -0.02657218)
      PathPoint P6: toes_r (0.01702737 -0.0064 -0.02617705)
      PathPoint P7: toes_r (0.06173794 -0.0102 -0.01787942)
      FiberForceLengthCurve: strain_at_zero_force=0.01130745 strain_at_one_norm_force=0.7002505
          stiffness_at_low_force=0.2 stiffness_at_one_norm_force=2.902997 curviness=0.75
    Millard2012EquilibriumMuscle gaslat_r: max_isometric_force=1575.059 optimal_fiber_length=0.06900216
        tendon_slack_length=0.4413207 pennation_angle_at_optimal=0.2102268
      PathPoint P1: femur_r (-0.003456103 -0.4198493 0.03191135)
      PathPoint P2: calcn_r (0.004833575 0.031 -0.00523541)
      PathWrap: wrap_object=GasLat_at_shank_r method=hybrid
      PathWrap pathwrap_0: wrap_object=Gastroc_at_condyles_r method=hybrid
      FiberForceLengthCurve: strain_at_zero_force=-0.05983233 strain_at_one_norm_force=0.7435102
          stiffness_at_low_force=0.2 stiffness_at_one_norm_force=2.489598 curviness=0.75
    Millard2012EquilibriumMuscle gasmed_r: max_isometric_force=3115.515 optimal_fiber_length=0.05982225
        tendon_slack_length=0.4676884 pennation_angle_at_optimal=0.1656816
      PathPoint P1: femur_r (0.009216274 -0.4169872 -0.02396231)
      PathPoint P2: calcn_r (0.004833575 0.031 -0.00523541)
      PathWrap: wrap_object=GasMed_at_shank_r method=hybrid
      PathWrap pathwrap_0: wrap_object=Gastroc_at_condyles_r method=hybrid
      FiberForceLengthCurve: strain_at_zero_force=0.1998358 strain_at_one_norm_force=0.7902371
          stiffness_at_low_force=0.2 stiffness_at_one_norm_force=3.387526 curviness=0.75
    Millard2012EquilibriumMuscle glmax1_r: max_isometric_force=983.7836 optimal_fiber_length=0.1619871
        tendon_slack_length=0.05382037 pennation_angle_at_optimal=0.3540118
      PathPoint P1: pelvis (-0.1342709 0.03682116 0.08256112)
      PathPoint P2: pelvis (-0.1371068 -0.02582818 0.1142364)
      PathPoint P3: femur_r (-0.05115032 -0.03588644 0.03479143)
      PathPoint P4: femur_r (-0.03191135 -0.0623059 0.05414561)
      PathWrap: wrap_object=Gmax1_at_pelvis_r method=hybrid
      FiberForceLengthCurve: strain_at_zero_force=-0.07534176 strain_at_one_norm_force=0.8468075
          stiffness_at_low_force=0.2 stiffness_at_one_norm_force=2.168846 curviness=0.75
    Millard2012EquilibriumMuscle glmax2_r: max_isometric_force=1406.046 optimal_fiber_length=0.1756412
        tendon_slack_length=0.07594763 pennation_angle_at_optimal=0.3673821
      PathPoint P1: pelvis (-0.1436513 0.009285337 0.06774998)
      PathPoint P2: pelvis (-0.1465963 -0.06499736 0.1192224)
      PathPoint P3: femur_r (-0.05184154 -0.06428736 0.02903126)
      PathPoint P4: femur_r (-0.01797173 -0.1118424 0.04827023)
      PathWrap: wrap_object=Gmax2_at_pelvis_r method=hybrid
      FiberForceLengthCurve: strain_at_zero_force=0.199275 strain_at_one_norm_force=0.7164175
          stiffness_at_low_force=0.2 stiffness_at_one_norm_force=3.867406 curviness=0.75
    Millard2012EquilibriumMuscle glmax3_r: max_isometric_force=947.7541 optimal_fiber_length=0.1933779
        tendon_slack_length=0.08072844 pennation_angle_at_optimal=0.3824161
      PathPoint P1: pelvis (-0.141797 -0.05603221 0.01319805)
      PathPoint P2: pelvis (-0.138852 -0.1347975 0.06379056)
      PathPoint P3: femur_r (-0.03237216 -0.1238412 0.01082912)
      PathPoint P4: femur_r (-0.006912205 -0.1562051 0.04734861)
      PathWrap: wrap_object=Gmax3_at_pelvis_r method=hybrid
      FiberForceLengthCurve: strain_at_zero_force=0.1989714 strain_at_one_norm_force=0.7121937
          stiffness_at_low_force=0.2 stiffness_at_one_norm_force=3.896947 curviness=0.75
    Millard2012EquilibriumMuscle glmed1_r: max_isometric_force=1093.467 optimal_fiber_length=0.0814892
        tendon_slack_length=0.06230779 pennation_angle_at_optimal=0.3165559
      PathPoint P1: pelvis (-0.05359645 0.02791285 0.1690646)
      PathPoint P2_0: femur_r (-0.01600378 -0.02013901 0.06818847)
      FiberForceLengthCurve: strain_at_zero_force=-3.729382e-9 strain_at_one_norm_force=0.7 stiffness_at_low_force=0.2
          stiffness_at_one_norm_force=2.857143 curviness=0.75
    Millard2012EquilibriumMuscle glmed2_r: max_isometric_force=765.0917 optimal_fiber_length=0.09073167
        tendon_slack_length=0.08109772 pennation_angle_at_optimal=0.3165559
      PathPoint P1: pelvis (-0.09241602 0.05830969 0.1202247)
      PathPoint P2_0: femur_r (-0.02538624 -0.01096308 0.06465933)
      FiberForceLengthCurve: strain_at_zero_force=0.06397124 strain_at_one_norm_force=0.7014005
          stiffness_at_low_force=0.2 stiffness_at_one_norm_force=3.137603 curviness=0.75
    Millard2012EquilibriumMuscle glmed3_r: max_isometric_force=871.1993 optimal_fiber_length=0.08691965
        tendon_slack_length=0.05385785 pennation_angle_at_optimal=0.3165559
      PathPoint P1: pelvis (-0.1089283 0.01660623 0.09370852)
      PathPoint P2_0: femur_r (-0.03559786 -0.005173812 0.05967537)
      FiberForceLengthCurve: strain_at_zero_force=0.1252157 strain_at_one_norm_force=0.7030514
          stiffness_at_low_force=0.2 stiffness_at_one_norm_force=3.461191 curviness=0.75
    Millard2012EquilibriumMuscle glmin1_r: max_isometric_force=374.0459 optimal_fiber_length=0.08642544
        tendon_slack_length=0.02051051 pennation_angle_at_optimal=0.1745329
      PathPoint P1: pelvis (-0.03226377 -0.0001154975 0.1737076)
      PathPoint P2: femur_r (0.006323883 -0.01705002 0.06455747)
      FiberForceLengthCurve: strain_at_zero_force=-3.729382e-9 strain_at_one_norm_force=0.7 stiffness_at_low_force=0.2
          stiffness_at_one_norm_force=2.857143 curviness=0.75
    Millard2012EquilibriumMuscle glmin2_r: max_isometric_force=394.8197 optimal_fiber_length=0.07269757
        tendon_slack_length=0.03388103 pennation_angle_at_optimal=0
      PathPoint P1: pelvis (-0.06718997 0.01067309 0.1483245)
      PathPoint P2: femur_r (0.00408228 -0.009920805 0.0604407)
      FiberForceLengthCurve: strain_at_zero_force=0.003039474 strain_at_one_norm_force=0.7000285
          stiffness_at_low_force=0.2 stiffness_at_one_norm_force=2.869486 curviness=0.75
    Millard2012EquilibriumMuscle glmin3_r: max_isometric_force=446.7738 optimal_fiber_length=0.03865552
        tendon_slack_length=0.05175007 pennation_angle_at_optimal=0.01745329
      PathPoint P1: pelvis (-0.08605989 -0.01654284 0.1170227)
      PathPoint P2: femur_r (-0.004119833 -0.001394398 0.05905517)
      FiberForceLengthCurve: strain_at_zero_force=0.007461173 strain_at_one_norm_force=0.7002322
          stiffness_at_low_force=0.2 stiffness_at_one_norm_force=2.886957 curviness=0.75
    Millard2012EquilibriumMuscle grac_r: max_isometric_force=281.3115 optimal_fiber_length=0.2546623
        tendon_slack_length=0.1922977 pennation_angle_at_optimal=0.1720016
      PathPoint P1: pelvis (-0.05165775 -0.1380207 0.036016)
      PathPoint P2: tibia_r (-0.01819552 -0.05661625 -0.02924915)
      PathPoint P3: tibia_r (0.001758308 -0.08289429 -0.0155383)
      PathWrap: wrap_object=GR_at_condyles_r method=hybrid
      FiberForceLengthCurve: strain_at_zero_force=-0.1969779 strain_at_one_norm_force=0.8027483
          stiffness_at_low_force=0.2 stiffness_at_one_norm_force=2.000548 curviness=0.75
    Millard2012EquilibriumMuscle iliacus_r: max_isometric_force=1021.141 optimal_fiber_length=0.1163663
        tendon_slack_length=0.1049269 pennation_angle_at_optimal=0.279914
      PathPoint P1: pelvis (-0.06599015 0.03297896 0.1236217)
      PathPoint P2: pelvis (-0.01472508 -0.0594475 0.1108636)
      PathPoint P3: femur_r (-0.002649679 -0.06219582 0.01601328)
      PathPoint P4: femur_r (-0.01405482 -0.07012166 0.02257987)
      PathWrap: wrap_object=IL_at_brim_r method=hybrid range=(2 3)
      FiberForceLengthCurve: strain_at_zero_force=-0.1703103 strain_at_one_norm_force=0.5005449
          stiffness_at_low_force=0.2 stiffness_at_one_norm_force=2.98127 curviness=0.75
    Millard2012EquilibriumMuscle perbrev_r: max_isometric_force=521.2016 optimal_fiber_length=0.05216518
        tendon_slack_length=0.169511 pennation_angle_at_optimal=0.2052361
      PathPoint P1: tibia_r (-0.02400386 -0.3014771 0.02479411)
      PathPoint P2: tibia_r (-0.03348687 -0.463527 0.02459655)
      PathPoint P3: tibia_r (-0.02815268 -0.4767434 0.02518924)
      PathPoint P4: calcn_r (0.05174122 0.027 0.02301605)
      PathPoint P5: calcn_r (0.07437114 0.0219 0.033882)
      FiberForceLengthCurve: strain_at_zero_force=-0.04234068 strain_at_one_norm_force=0.6987541
          stiffness_at_low_force=0.2 stiffness_at_one_norm_force=2.69871 curviness=0.75
    Millard2012EquilibriumMuscle perlong_r: max_isometric_force=1115.371 optimal_fiber_length=0.05806097
        tendon_slack_length=0.3797059 pennation_angle_at_optimal=0.2479525
      PathPoint P1: tibia_r (-0.01975627 -0.1634787 0.02785633)
      PathPoint P2: tibia_r (-0.03131368 -0.4643604 0.02341118)
      PathPoint P3: tibia_r (-0.02686852 -0.4779341 0.02370752)
      PathPoint P4: calcn_r (0.04811604 0.023 0.02183067)
      PathPoint P5: calcn_r (0.07481056 0.0106 0.0280539)
      PathPoint P6: calcn_r (0.09359559 0.0069 0.0116562)
      PathPoint P7: calcn_r (0.1321543 0.0085 -0.01817576)
      FiberForceLengthCurve: strain_at_zero_force=-0.1323481 strain_at_one_norm_force=0.6924185
          stiffness_at_low_force=0.2 stiffness_at_one_norm_force=2.424929 curviness=0.75
    Millard2012EquilibriumMuscle piri_r: max_isometric_force=1029.787 optimal_fiber_length=0.03243176
        tendon_slack_length=0.1433312 pennation_angle_at_optimal=0.1745329
      PathPoint P1: pelvis (-0.1110489 -0.006969339 0.01981174)
      PathPoint P2: pelvis (-0.1112779 -0.03272281 0.08933611)
      PathPoint P3: femur_r (-0.01705011 -0.00396292 0.0503439)
      FiberForceLengthCurve: strain_at_zero_force=0.09922992 strain_at_one_norm_force=0.7028348
          stiffness_at_low_force=0.2 stiffness_at_one_norm_force=3.313426 curviness=0.75
    Millard2012EquilibriumMuscle psoas_r: max_isometric_force=1426.79 optimal_fiber_length=0.1285854
        tendon_slack_length=0.1094936 pennation_angle_at_optimal=0.2155251
      PathPoint P1: pelvis (-0.06609923 0.06617137 0.05719154)
      PathPoint P2: pelvis (-0.0223603 -0.06980012 0.0961991)
      PathPoint P3: femur_r (-0.01520685 -0.05140787 0.005299357)
      PathPoint P4: femur_r (-0.0270728 -0.0576825 0.0101379)
      PathWrap: wrap_object=PS_at_brim_r method=hybrid range=(2 3)
      FiberForceLengthCurve: strain_at_zero_force=-0.09543841 strain_at_one_norm_force=0.5010382
          stiffness_at_low_force=0.2 stiffness_at_one_norm_force=3.353023 curviness=0.75
    Millard2012EquilibriumMuscle recfem_r: max_isometric_force=2191.741 optimal_fiber_length=0.08456272
        tendon_slack_length=0.4996816 pennation_angle_at_optimal=0.2170149
      PathPoint P1: pelvis (-0.02617791 -0.04141047 0.1368198)
      PathPoint P2: patella_r (0.01152034 0.05644968 0.000806424)
      PathPoint P3: patella_r (0.01393961 0.0503439 -0.001152034)
      PathPoint P4: patella_r (0.005760171 0.002845525 3.456103e-5)
      PathPoint P5: tibia_r (0.03220271 -0.07515495 -0.0004642722)
      PathWrap: wrap_object=KnExt_at_fem_r method=hybrid
      FiberForceLengthCurve: strain_at_zero_force=0.1999726 strain_at_one_norm_force=0.8999622
          stiffness_at_low_force=0.2 stiffness_at_one_norm_force=2.857186 curviness=0.75
    Millard2012EquilibriumMuscle sart_r: max_isometric_force=249.4131 optimal_fiber_length=0.4446043
        tendon_slack_length=0.1368011 pennation_angle_at_optimal=0.02613542
      PathPoint P1: pelvis (-0.02126955 -0.01664957 0.1548571)
      PathPoint P2: femur_r (-0.003456103 -0.3927694 -0.04850064)
      PathPoint P3: tibia_r (-0.02479411 -0.04774578 -0.03605519)
      PathPoint P4: tibia_r (-0.01570623 -0.071321 -0.02607827)
      PathPoint P5: tibia_r (0.01343426 -0.09644409 -0.002568315)
      FiberForceLengthCurve: strain_at_zero_force=-0.1984568 strain_at_one_norm_force=0.7212821
          stiffness_at_low_force=0.2 stiffness_at_one_norm_force=2.17453 curviness=0.75
    Millard2012EquilibriumMuscle semimem_r: max_isometric_force=2200.987 optimal_fiber_length=0.07689191
        tendon_slack_length=0.3873413 pennation_angle_at_optimal=0.2545615
      PathPoint P1: pelvis (-0.1076567 -0.1216699 0.09004001)
      PathPoint P2: tibia_r (-0.02864659 -0.04965085 -0.01936114)
      PathWrap: wrap_object=SM_at_condyles_r method=hybrid
      FiberForceLengthCurve: strain_at_zero_force=0.1994426 strain_at_one_norm_force=0.7353994
          stiffness_at_low_force=0.2 stiffness_at_one_norm_force=3.731644 curviness=0.75
    Millard2012EquilibriumMuscle semiten_r: max_isometric_force=591.2951 optimal_fiber_length=0.2148258
        tendon_slack_length=0.275154 pennation_angle_at_optimal=0.241295
      PathPoint P1: pelvis (-0.1132195 -0.1337302 0.07552216)
      PathPoint P2: tibia_r (-0.03081977 -0.06048592 -0.02262092)
      PathPoint P3: tibia_r (0.001876845 -0.09203862 -0.01155742)
      PathWrap: wrap_object=ST_at_condyles_r method=hybrid
      FiberForceLengthCurve: strain_at_zero_force=0.007279189 strain_at_one_norm_force=0.7803276
          stiffness_at_low_force=0.2 stiffness_at_one_norm_force=2.58716 curviness=0.75
    Millard2012EquilibriumMuscle soleus_r: max_isometric_force=6194.843 optimal_fiber_length=0.0520167
        tendon_slack_length=0.3271802 pennation_angle_at_optimal=0.3814289
      PathPoint P1: tibia_r (-0.007507381 -0.1090652 0.00968057)
      PathPoint P2: calcn_r (0.004833575 0.031 -0.00523541)
      FiberForceLengthCurve: strain_at_zero_force=0.1569032 strain_at_one_norm_force=0.8506533
          stiffness_at_low_force=0.2 stiffness_at_one_norm_force=2.882882 curviness=0.75
    Millard2012EquilibriumMuscle tfl_r: max_isometric_force=411.2066 optimal_fiber_length=0.1026638
        tendon_slack_length=0.4857587 pennation_angle_at_optimal=0.05235988
      PathPoint P1: pelvis (-0.02218555 0.01158143 0.1896083)
      PathPoint P2: femur_r (0.03386981 -0.1095307 0.06877644)
      PathPoint P3: femur_r (0.01232677 -0.4458285 0.03732591)
      PathPoint P4: tibia_r (0.01066838 -0.04881738 0.03417834)
      FiberForceLengthCurve: strain_at_zero_force=0.07118385 strain_at_one_norm_force=0.7197196
          stiffness_at_low_force=0.2 stiffness_at_one_norm_force=3.08387 curviness=0.75
    Millard2012EquilibriumMuscle tibant_r: max_isometric_force=1227.452 optimal_fiber_length=0.0802273
        tendon_slack_length=0.282453 pennation_angle_at_optimal=0.1951828
      PathPoint P1: tibia_r (0.01521232 -0.1562156 0.01600258)
      PathPoint P2: tibia_r (0.02479411 -0.2269413 0.01264401)
      PathPoint P3: tibia_r (0.02301605 -0.4356653 -0.01303914)
      PathPoint P4: calcn_r (0.1280897 0.0178 -0.03012831)
      FiberForceLengthCurve: strain_at_zero_force=0.1892237 strain_at_one_norm_force=0.7076768
          stiffness_at_low_force=0.2 stiffness_at_one_norm_force=3.85763 curviness=0.75
    Millard2012EquilibriumMuscle tibpost_r: max_isometric_force=1730.154 optimal_fiber_length=0.04420803
        tendon_slack_length=0.3283787 pennation_angle_at_optimal=0.2264891
      PathPoint P1: tibia_r (-0.004050035 -0.1552631 0.01017448)
      PathPoint P2: tibia_r (-0.01620014 -0.4351891 -0.01728673)
      PathPoint P3: calcn_r (0.04580911 0.0334 -0.02825146)
      PathPoint P4: calcn_r (0.08480727 0.0159 -0.02775755)
      FiberForceLengthCurve: strain_at_zero_force=-0.1916705 strain_at_one_norm_force=0.6862359
          stiffness_at_low_force=0.2 stiffness_at_one_norm_force=2.278147 curviness=0.75
    Millard2012EquilibriumMuscle vasint_r: max_isometric_force=1697.361 optimal_fiber_length=0.112176
        tendon_slack_length=0.2284308 pennation_angle_at_optimal=0.06309973
      PathPoint P1: femur_r (0.03340899 -0.211796 0.03571306)
      PathPoint P2: femur_r (0.03859315 -0.229409 0.03283298)
      PathPoint P3: patella_r (0.006681798 0.05529764 -0.0006912205)
      PathPoint P4: patella_r (0.005760171 0.002845525 -0.0004492933)
      PathPoint P5: tibia_r (0.03217308 -0.0752502 0.0004247597)
      PathWrap: wrap_object=KnExt_at_fem_r method=hybrid
      FiberForceLengthCurve: strain_at_zero_force=0.1999153 strain_at_one_norm_force=0.8514363
          stiffness_at_low_force=0.2 stiffness_at_one_norm_force=3.06974 curviness=0.75
    Millard2012EquilibriumMuscle vaslat_r: max_isometric_force=5148.767 optimal_fiber_length=0.1124036
        tendon_slack_length=0.2494606 pennation_angle_at_optimal=0.2528673
      PathPoint P1: femur_r (0.005529764 -0.2040904 0.04020599)
      PathPoint P2: femur_r (0.03098972 -0.2852201 0.0471182)
      PathPoint P3: patella_r (0.01186595 0.04873105 0.01624368)
      PathPoint P4: patella_r (0.005760171 0.002845525 0.008444411)
      PathPoint P5: tibia_r (0.03214344 -0.07546452 0.005047726)
      PathWrap: wrap_object=KnExt_at_fem_r method=hybrid
      FiberForceLengthCurve: strain_at_zero_force=0.1999632 strain_at_one_norm_force=0.8928189
          stiffness_at_low_force=0.2 stiffness_at_one_norm_force=2.886604 curviness=0.75
    Millard2012EquilibriumMuscle vasmed_r: max_isometric_force=2747.823 optimal_fiber_length=0.1096633
        tendon_slack_length=0.2264687 pennation_angle_at_optimal=0.4222225
      PathPoint P1: femur_r (0.01612848 -0.2310602 0.02165824)
      PathPoint P2: femur_r (0.04101242 -0.3048146 0.001036831)
      PathPoint P3: patella_r (0.007257816 0.05126552 -0.01958458)
      PathPoint P4: patella_r (0.005760171 0.002845525 -0.009792291)
      PathPoint P5: tibia_r (0.03151124 -0.07569075 -0.006697374)
      PathWrap: wrap_object=KnExt_at_fem_r method=hybrid
      FiberForceLengthCurve: strain_at_zero_force=0.1999354 strain_at_one_norm_force=0.8518332
          stiffness_at_low_force=0.2 stiffness_at_one_norm_force=3.067965 curviness=0.75
    Millard2012EquilibriumMuscle addbrev_l: max_isometric_force=625.8197 optimal_fiber_length=0.1261288
        tendon_slack_length=0.04336859 pennation_angle_at_optimal=0.1147809
      PathPoint P1: pelvis (-0.02083326 -0.1003243 -0.02258333)
      PathPoint P2: femur_l (-0.002309709 -0.1316186 -0.02875588)
      PathWrap: wrap_object=AB_at_femshaft_l method=hybrid
      FiberForceLengthCurve: strain_at_zero_force=-0.1927643 strain_at_one_norm_force=0.5015522
          stiffness_at_low_force=0.2 stiffness_at_one_norm_force=2.880531 curviness=0.75
    Millard2012EquilibriumMuscle addlong_l: max_isometric_force=916.8 optimal_fiber_length=0.1239104
        tendon_slack_length=0.1509364 pennation_angle_at_optimal=0.1377704
      PathPoint P1: pelvis (-0.008267857 -0.0948812 -0.02768657)
      PathPoint P2: femur_l (0.01300366 -0.2669961 -0.01828135)
      PathWrap: wrap_object=AL_at_femshaft_l method=hybrid
      FiberForceLengthCurve: strain_at_zero_force=-0.1917374 strain_at_one_norm_force=0.5002995
          stiffness_at_low_force=0.2 stiffness_at_one_norm_force=2.890019 curviness=0.75
    Millard2012EquilibriumMuscle addmagDist_l: max_isometric_force=597.2951 optimal_fiber_length=0.2025367
        tendon_slack_length=0.09987469 pennation_angle_at_optimal=0.194705
      PathPoint P1: pelvis (-0.08075886 -0.1362597 -0.05839403)
      PathPoint P2: femur_l (0.01299211 -0.2927955 -0.02228869)
      PathWrap: wrap_object=AMdist_at_femshaft_l method=hybrid
      FiberForceLengthCurve: strain_at_zero_force=-3.981963e-9 strain_at_one_norm_force=0.7 stiffness_at_low_force=0.2
          stiffness_at_one_norm_force=2.857143 curviness=0.75
    Millard2012EquilibriumMuscle addmagIsch_l: max_isometric_force=597.2951 optimal_fiber_length=0.1753641
        tendon_slack_length=0.242886 pennation_angle_at_optimal=0.1680443
      PathPoint P1: pelvis (-0.09775269 -0.1384903 -0.06116562)
      PathPoint P2: femur_l (0.00555485 -0.4327462 0.03779839)
      PathWrap: wrap_object=AMisch_at_condyles_l method=hybrid
      FiberForceLengthCurve: strain_at_zero_force=0.007389956 strain_at_one_norm_force=0.7000392
          stiffness_at_low_force=0.2 stiffness_at_one_norm_force=2.887464 curviness=0.75
    Millard2012EquilibriumMuscle addmagMid_l: max_isometric_force=597.2951 optimal_fiber_length=0.1652862
        tendon_slack_length=0.05596888 pennation_angle_at_optimal=0.2073076
      PathPoint P1: pelvis (-0.0574387 -0.1288741 -0.04185247)
      PathPoint P2: femur_l (0.002794748 -0.1811428 -0.03374485)
      PathWrap: wrap_object=AMmid_at_femshaft_l method=hybrid
      FiberForceLengthCurve: strain_at_zero_force=-3.981963e-9 strain_at_one_norm_force=0.7 stiffness_at_low_force=0.2
          stiffness_at_one_norm_force=2.857143 curviness=0.75
    Millard2012EquilibriumMuscle addmagProx_l: max_isometric_force=597.2951 optimal_fiber_length=0.1362284
        tendon_slack_length=0.05201978 pennation_angle_at_optimal=0.3114833
      PathPoint P1: pelvis (-0.03379132 -0.114786 -0.02001704)
      PathPoint P2: femur_l (-0.01763463 -0.08796135 -0.03697844)
      PathWrap: wrap_object=AMprox_at_femshaft_l method=hybrid
      FiberForceLengthCurve: strain_at_zero_force=-3.981963e-9 strain_at_one_norm_force=0.7 stiffness_at_low_force=0.2
          stiffness_at_one_norm_force=2.857143 curviness=0.75
    Millard2012EquilibriumMuscle bflh_l: max_isometric_force=1313.184 optimal_fiber_length=0.1096445
        tendon_slack_length=0.3653618 pennation_angle_at_optimal=0.1759182
      PathPoint P1: pelvis (-0.1134376 -0.1271131 -0.08593395)
      PathPoint P2: tibia_l (-0.03298815 -0.04034506 -0.02476559)
      PathPoint P3: tibia_l (-0.02809377 -0.05244858 -0.02965997)
      FiberForceLengthCurve: strain_at_zero_force=0.1965607 strain_at_one_norm_force=0.7068715
          stiffness_at_low_force=0.2 stiffness_at_one_norm_force=3.91918 curviness=0.75
    Millard2012EquilibriumMuscle bfsh_l: max_isometric_force=557.1148 optimal_fiber_length=0.1234722
        tendon_slack_length=0.1184541 pennation_angle_at_optimal=0.2642232
      PathPoint P1: femur_l (0.005774273 -0.2354634 -0.0270236)
      PathPoint P2: tibia_l (-0.02946419 -0.0482988 -0.03112829)
      PathWrap: wrap_object=BF_at_gastroc_l method=hybrid
      FiberForceLengthCurve: strain_at_zero_force=0.115251 strain_at_one_norm_force=0.6888986
          stiffness_at_low_force=0.2 stiffness_at_one_norm_force=3.486462 curviness=0.75
    Millard2012EquilibriumMuscle edl_l: max_isometric_force=603.4982 optimal_fiber_length=0.07987956
        tendon_slack_length=0.4251889 pennation_angle_at_optimal=0.2182582
      PathPoint P1: tibia_l (-0.01566203 -0.1333692 -0.02006698)
      PathPoint P2: tibia_l (0.01605358 -0.4334212 -0.01096342)
      PathPoint P3: calcn_l (0.1069508 0.036 -0.0007831015)
      PathPoint P4: calcn_l (0.1880658 0.0055 -0.0127254)
      PathPoint P5: toes_l (0.0003491321 0.0047 -0.01497682)
      PathPoint P6: toes_l (0.05155517 -0.0004 -0.02447192)
      FiberForceLengthCurve: strain_at_zero_force=0.1317998 strain_at_one_norm_force=0.7072192
          stiffness_at_low_force=0.2 stiffness_at_one_norm_force=3.475726 curviness=0.75
    Millard2012EquilibriumMuscle ehl_l: max_isometric_force=285.8675 optimal_fiber_length=0.086204
        tendon_slack_length=0.3766185 pennation_angle_at_optimal=0.1972681
      PathPoint P1: tibia_l (-0.01370428 -0.178671 -0.01850077)
      PathPoint P2: tibia_l (0.006950026 -0.3353251 -0.01605358)
      PathPoint P3: tibia_l (0.01957754 -0.425698 0.002740855)
      PathPoint P4: calcn_l (0.112886 0.0389 0.0206543)
      PathPoint P5: calcn_l (0.1504759 0.0309 0.02515714)
      PathPoint P6: calcn_l (0.2017983 0.0139 0.02740855)
      PathPoint P7: toes_l (0.03468045 0.0041 0.02398248)
      PathPoint P8: toes_l (0.06552046 0.0034 0.01820711)
      FiberForceLengthCurve: strain_at_zero_force=0.1051406 strain_at_one_norm_force=0.7178208
          stiffness_at_low_force=0.2 stiffness_at_one_norm_force=3.264346 curviness=0.75
    Millard2012EquilibriumMuscle fdl_l: max_isometric_force=423.177 optimal_fiber_length=0.05089277
        tendon_slack_length=0.4322152 pennation_angle_at_optimal=0.2248391
      PathPoint P1: tibia_l (-0.002251417 -0.2111776 0.001761978)
      PathPoint P2: tibia_l (-0.01722823 -0.420165 0.01213807)
      PathPoint P3: calcn_l (0.05074053 0.0315 0.02740855)
      PathPoint P4: calcn_l (0.08239517 0.0176 0.02574446)
      PathPoint P5: calcn_l (0.1929537 -0.0081 -0.01135497)
      PathPoint P6: toes_l (-0.00221117 -0.0078 -0.01438949)
      PathPoint P7: toes_l (0.03316755 -0.0071 -0.02104585)
      PathPoint P8: toes_l (0.05132242 -0.006 -0.02368882)
      FiberForceLengthCurve: strain_at_zero_force=-0.01205975 strain_at_one_norm_force=0.6997089
          stiffness_at_low_force=0.2 stiffness_at_one_norm_force=2.809902 curviness=0.75
    Millard2012EquilibriumMuscle fhl_l: max_isometric_force=907.8393 optimal_fiber_length=0.06038196
        tendon_slack_length=0.405991 pennation_angle_at_optimal=0.2580255
      PathPoint P1: tibia_l (-0.03034518 -0.2493325 -0.01957754)
      PathPoint P2: tibia_l (-0.02368882 -0.423162 0.007439464)
      PathPoint P3: calcn_l (0.04352513 0.0276 0.02359093)
      PathPoint P4: calcn_l (0.1207997 0.0068 0.02505925)
      PathPoint P5: calcn_l (0.2008673 -0.0053 0.02633179)
      PathPoint P6: toes_l (0.01803849 -0.0064 0.02594024)
      PathPoint P7: toes_l (0.06540408 -0.0102 0.01771767)
      FiberForceLengthCurve: strain_at_zero_force=0.01130745 strain_at_one_norm_force=0.7002505
          stiffness_at_low_force=0.2 stiffness_at_one_norm_force=2.902997 curviness=0.75
    Millard2012EquilibriumMuscle gaslat_l: max_isometric_force=1575.059 optimal_fiber_length=0.06703134
        tendon_slack_length=0.4287158 pennation_angle_at_optimal=0.2102268
      PathPoint P1: femur_l (-0.003464564 -0.425418 -0.03198947)
      PathPoint P2: calcn_l (0.005120604 0.031 0.005188048)
      PathWrap: wrap_object=GasLat_at_shank_l method=hybrid
      PathWrap pathwrap_0: wrap_object=Gastroc_at_condyles_l method=hybrid
      FiberForceLengthCurve: strain_at_zero_force=-0.05983233 strain_at_one_norm_force=0.7435102
          stiffness_at_low_force=0.2 stiffness_at_one_norm_force=2.489598 curviness=0.75
    Millard2012EquilibriumMuscle gasmed_l: max_isometric_force=3115.515 optimal_fiber_length=0.05814303
        tendon_slack_length=0.4545603 pennation_angle_at_optimal=0.1656816
      PathPoint P1: femur_l (0.009238836 -0.4225179 0.02402097)
      PathPoint P2: calcn_l (0.005120604 0.031 0.005188048)
      PathWrap: wrap_object=GasMed_at_shank_l method=hybrid
      PathWrap pathwrap_0: wrap_object=Gastroc_at_condyles_l method=hybrid
      FiberForceLengthCurve: strain_at_zero_force=0.1998358 strain_at_one_norm_force=0.7902371
          stiffness_at_low_force=0.2 stiffness_at_one_norm_force=3.387526 curviness=0.75
    Millard2012EquilibriumMuscle glmax1_l: max_isometric_force=983.7836 optimal_fiber_length=0.1625441
        tendon_slack_length=0.05400543 pennation_angle_at_optimal=0.3540118
      PathPoint P1: pelvis (-0.1342709 0.03682116 -0.08256112)
      PathPoint P2: pelvis (-0.1371068 -0.02582818 -0.1142364)
      PathPoint P3: femur_l (-0.05127554 -0.03636242 -0.03487661)
      PathPoint P4: femur_l (-0.03198947 -0.06313229 -0.05427816)
      PathWrap: wrap_object=Gmax1_at_pelvis_l method=hybrid
      FiberForceLengthCurve: strain_at_zero_force=-0.07534176 strain_at_one_norm_force=0.8468075
          stiffness_at_low_force=0.2 stiffness_at_one_norm_force=2.168846 curviness=0.75
    Millard2012EquilibriumMuscle glmax2_l: max_isometric_force=1406.046 optimal_fiber_length=0.1765673
        tendon_slack_length=0.07634808 pennation_angle_at_optimal=0.3673821
      PathPoint P1: pelvis (-0.1436513 0.009285337 -0.06774998)
      PathPoint P2: pelvis (-0.1465963 -0.06499736 -0.1192224)
      PathPoint P3: femur_l (-0.05196846 -0.06514003 -0.02910233)
      PathPoint P4: femur_l (-0.01801573 -0.1133258 -0.04838841)
      PathWrap: wrap_object=Gmax2_at_pelvis_l method=hybrid
      FiberForceLengthCurve: strain_at_zero_force=0.199275 strain_at_one_norm_force=0.7164175
          stiffness_at_low_force=0.2 stiffness_at_one_norm_force=3.867406 curviness=0.75
    Millard2012EquilibriumMuscle glmax3_l: max_isometric_force=947.7541 optimal_fiber_length=0.1945
        tendon_slack_length=0.0811969 pennation_angle_at_optimal=0.3824161
      PathPoint P1: pelvis (-0.141797 -0.05603221 -0.01319805)
      PathPoint P2: pelvis (-0.138852 -0.1347975 -0.06379056)
      PathPoint P3: femur_l (-0.03245141 -0.1254838 -0.01085563)
      PathPoint P4: femur_l (-0.006929127 -0.1582769 -0.04746452)
      PathWrap: wrap_object=Gmax3_at_pelvis_l method=hybrid
      FiberForceLengthCurve: strain_at_zero_force=0.1989714 strain_at_one_norm_force=0.7121937
          stiffness_at_low_force=0.2 stiffness_at_one_norm_force=3.896947 curviness=0.75
    Millard2012EquilibriumMuscle glmed1_l: max_isometric_force=1093.467 optimal_fiber_length=0.08141053
        tendon_slack_length=0.06224765 pennation_angle_at_optimal=0.3165559
      PathPoint P1: pelvis (-0.05344657 0.02774928 -0.1686417)
      PathPoint P2: femur_l (-0.01616796 -0.02007741 -0.06813642)
      FiberForceLengthCurve: strain_at_zero_force=-3.729382e-9 strain_at_one_norm_force=0.7 stiffness_at_low_force=0.2
          stiffness_at_one_norm_force=2.857143 curviness=0.75
    Millard2012EquilibriumMuscle glmed2_l: max_isometric_force=765.0917 optimal_fiber_length=0.09103644
        tendon_slack_length=0.08137013 pennation_angle_at_optimal=0.3165559
      PathPoint P1: pelvis (-0.09271344 0.05870041 -0.1202489)
      PathPoint P2: femur_l (-0.0254068 -0.01115412 -0.06467186)
      FiberForceLengthCurve: strain_at_zero_force=0.06397124 strain_at_one_norm_force=0.7014005
          stiffness_at_low_force=0.2 stiffness_at_one_norm_force=3.137603 curviness=0.75
    Millard2012EquilibriumMuscle glmed3_l: max_isometric_force=871.1993 optimal_fiber_length=0.08720556
        tendon_slack_length=0.05403501 pennation_angle_at_optimal=0.3165559
      PathPoint P1: pelvis (-0.1090746 0.01707648 -0.09385278)
      PathPoint P2: femur_l (-0.03568501 -0.005242434 -0.05982147)
      FiberForceLengthCurve: strain_at_zero_force=0.1252157 strain_at_one_norm_force=0.7030514
          stiffness_at_low_force=0.2 stiffness_at_one_norm_force=3.461191 curviness=0.75
    Millard2012EquilibriumMuscle glmin1_l: max_isometric_force=374.0459 optimal_fiber_length=0.08630528
        tendon_slack_length=0.020482 pennation_angle_at_optimal=0.1745329
      PathPoint P1: pelvis (-0.03272239 0 -0.1730411)
      PathPoint P2: femur_l (0.005774273 -0.01673117 -0.06467186)
      FiberForceLengthCurve: strain_at_zero_force=-3.729382e-9 strain_at_one_norm_force=0.7 stiffness_at_low_force=0.2
          stiffness_at_one_norm_force=2.857143 curviness=0.75
    Millard2012EquilibriumMuscle glmin2_l: max_isometric_force=394.8197 optimal_fiber_length=0.07278063
        tendon_slack_length=0.03391974 pennation_angle_at_optimal=0
      PathPoint P1: pelvis (-0.06718997 0.0106728 -0.1481114)
      PathPoint P2: femur_l (0.004619418 -0.0100387 -0.06005244)
      FiberForceLengthCurve: strain_at_zero_force=0.003039474 strain_at_one_norm_force=0.7000285
          stiffness_at_low_force=0.2 stiffness_at_one_norm_force=2.869486 curviness=0.75
    Millard2012EquilibriumMuscle glmin3_l: max_isometric_force=446.7738 optimal_fiber_length=0.03847601
        tendon_slack_length=0.05150976 pennation_angle_at_optimal=0.01745329
      PathPoint P1: pelvis (-0.08605989 -0.01654284 -0.1170227)
      PathPoint P2: femur_l (-0.004619418 -0.001115412 -0.05889758)
      FiberForceLengthCurve: strain_at_zero_force=0.007461173 strain_at_one_norm_force=0.7002322
          stiffness_at_low_force=0.2 stiffness_at_one_norm_force=2.886957 curviness=0.75
    Millard2012EquilibriumMuscle grac_l: max_isometric_force=281.3115 optimal_fiber_length=0.2563645
        tendon_slack_length=0.1935831 pennation_angle_at_optimal=0.1720016
      PathPoint P1: pelvis (-0.05165775 -0.1380207 -0.036016)
      PathPoint P2: tibia_l (-0.01803091 -0.05481165 0.02898455)
      PathPoint P3: tibia_l (0.001742401 -0.08025209 0.01539773)
      PathWrap: wrap_object=GR_at_condyles_l method=hybrid
      FiberForceLengthCurve: strain_at_zero_force=-0.1969779 strain_at_one_norm_force=0.8027483
          stiffness_at_low_force=0.2 stiffness_at_one_norm_force=2.000548 curviness=0.75
    Millard2012EquilibriumMuscle iliacus_l: max_isometric_force=1021.141 optimal_fiber_length=0.1167307
        tendon_slack_length=0.1052555 pennation_angle_at_optimal=0.279914
      PathPoint P1: pelvis (-0.06599015 0.03297896 -0.1236217)
      PathPoint P2: pelvis (-0.01472508 -0.0594475 -0.1108636)
      PathPoint P3: femur_l (-0.002656165 -0.06302075 -0.01605248)
      PathPoint P4: femur_l (-0.01408923 -0.07105171 -0.02263515)
      PathWrap: wrap_object=IL_at_brim_l method=hybrid range=(2 3)
      FiberForceLengthCurve: strain_at_zero_force=-0.1703103 strain_at_one_norm_force=0.5005449
          stiffness_at_low_force=0.2 stiffness_at_one_norm_force=2.98127 curviness=0.75
    Millard2012EquilibriumMuscle perbrev_l: max_isometric_force=521.2016 optimal_fiber_length=0.05109414
        tendon_slack_length=0.1660307 pennation_angle_at_optimal=0.2052361
      PathPoint P1: tibia_l (-0.02378671 -0.2918677 -0.02456981)
      PathPoint P2: tibia_l (-0.03318393 -0.4487523 -0.02437403)
      PathPoint P3: tibia_l (-0.02789799 -0.4615475 -0.02496136)
      PathPoint P4: calcn_l (0.05481374 0.027 -0.02280783)
      PathPoint P5: calcn_l (0.07878748 0.0219 -0.03357548)
      FiberForceLengthCurve: strain_at_zero_force=-0.04234068 strain_at_one_norm_force=0.6987541
          stiffness_at_low_force=0.2 stiffness_at_one_norm_force=2.69871 curviness=0.75
    Millard2012EquilibriumMuscle perlong_l: max_isometric_force=1115.371 optimal_fiber_length=0.0572173
        tendon_slack_length=0.3741885 pennation_angle_at_optimal=0.2479525
      PathPoint P1: tibia_l (-0.01957754 -0.1582679 -0.02760433)
      PathPoint P2: tibia_l (-0.0310304 -0.4495592 -0.02319938)
      PathPoint P3: tibia_l (-0.02662545 -0.4627002 -0.02349305)
      PathPoint P4: calcn_l (0.05097329 0.023 -0.02163318)
      PathPoint P5: calcn_l (0.07925299 0.0106 -0.0278001)
      PathPoint P6: calcn_l (0.09915351 0.0069 -0.01155075)
      PathPoint P7: calcn_l (0.140002 0.0085 0.01801134)
      FiberForceLengthCurve: strain_at_zero_force=-0.1323481 strain_at_one_norm_force=0.6924185
          stiffness_at_low_force=0.2 stiffness_at_one_norm_force=2.424929 curviness=0.75
    Millard2012EquilibriumMuscle piri_l: max_isometric_force=1029.787 optimal_fiber_length=0.03245226
        tendon_slack_length=0.1434218 pennation_angle_at_optimal=0.1745329
      PathPoint P1: pelvis (-0.1110489 -0.006969339 -0.01981174)
      PathPoint P2: pelvis (-0.1112779 -0.03272281 -0.08933611)
      PathPoint P3: femur_l (-0.01709185 -0.004015482 -0.05046714)
      FiberForceLengthCurve: strain_at_zero_force=0.09922992 strain_at_one_norm_force=0.7028348
          stiffness_at_low_force=0.2 stiffness_at_one_norm_force=3.313426 curviness=0.75
    Millard2012EquilibriumMuscle psoas_l: max_isometric_force=1426.79 optimal_fiber_length=0.1288684
        tendon_slack_length=0.1097345 pennation_angle_at_optimal=0.2155251
      PathPoint P1: pelvis (-0.06609923 0.06617137 -0.05719154)
      PathPoint P2: pelvis (-0.0223603 -0.06980012 -0.0961991)
      PathPoint P3: femur_l (-0.01524408 -0.05208972 -0.005312331)
      PathPoint P4: femur_l (-0.02713908 -0.05844756 -0.01016272)
      PathWrap: wrap_object=PS_at_brim_l method=hybrid range=(2 3)
      FiberForceLengthCurve: strain_at_zero_force=-0.09543841 strain_at_one_norm_force=0.5010382
          stiffness_at_low_force=0.2 stiffness_at_one_norm_force=3.353023 curviness=0.75
    Millard2012EquilibriumMuscle recfem_l: max_isometric_force=2191.741 optimal_fiber_length=0.08517012
        tendon_slack_length=0.5032707 pennation_angle_at_optimal=0.2170149
      PathPoint P1: pelvis (-0.02617791 -0.04141047 -0.1368198)
      PathPoint P2: patella_l (0.01154855 0.05658787 -0.0008083982)
      PathPoint P3: patella_l (0.01397374 0.05046714 0.001154855)
      PathPoint P4: patella_l (0.005774273 0.002852491 -3.464564e-5)
      PathPoint P5: tibia_l (0.03191139 -0.07275943 0.0004600721)
      PathWrap: wrap_object=KnExt_at_fem_l method=hybrid
      FiberForceLengthCurve: strain_at_zero_force=0.1999726 strain_at_one_norm_force=0.8999622
          stiffness_at_low_force=0.2 stiffness_at_one_norm_force=2.857186 curviness=0.75
    Millard2012EquilibriumMuscle sart_l: max_isometric_force=249.4131 optimal_fiber_length=0.446719
        tendon_slack_length=0.1374518 pennation_angle_at_optimal=0.02613542
      PathPoint P1: pelvis (-0.02126955 -0.01664957 -0.1548571)
      PathPoint P2: femur_l (-0.003464564 -0.3979788 0.04861938)
      PathPoint P3: tibia_l (-0.02456981 -0.04622391 0.03572901)
      PathPoint P4: tibia_l (-0.01556414 -0.06904769 0.02584235)
      PathPoint P5: tibia_l (0.01331273 -0.09337 0.00254508)
      FiberForceLengthCurve: strain_at_zero_force=-0.1984568 strain_at_one_norm_force=0.7212821
          stiffness_at_low_force=0.2 stiffness_at_one_norm_force=2.17453 curviness=0.75
    Millard2012EquilibriumMuscle semimem_l: max_isometric_force=2200.987 optimal_fiber_length=0.07761888
        tendon_slack_length=0.3910034 pennation_angle_at_optimal=0.2545615
      PathPoint P1: pelvis (-0.1076567 -0.1216699 -0.09004001)
      PathPoint P2: tibia_l (-0.02838743 -0.04806826 0.01918599)
      PathWrap: wrap_object=SM_at_condyles_l method=hybrid
      FiberForceLengthCurve: strain_at_zero_force=0.1994426 strain_at_one_norm_force=0.7353994
          stiffness_at_low_force=0.2 stiffness_at_one_norm_force=3.731644 curviness=0.75
    Millard2012EquilibriumMuscle semiten_l: max_isometric_force=591.2951 optimal_fiber_length=0.216126
        tendon_slack_length=0.2768193 pennation_angle_at_optimal=0.241295
      PathPoint P1: pelvis (-0.1132195 -0.1337302 -0.07552216)
      PathPoint P2: tibia_l (-0.03054096 -0.05855797 0.02241628)
      PathPoint P3: tibia_l (0.001859866 -0.08910495 0.01145286)
      PathWrap: wrap_object=ST_at_condyles_l method=hybrid
      FiberForceLengthCurve: strain_at_zero_force=0.007279189 strain_at_one_norm_force=0.7803276
          stiffness_at_low_force=0.2 stiffness_at_one_norm_force=2.58716 curviness=0.75
    Millard2012EquilibriumMuscle soleus_l: max_isometric_force=6194.843 optimal_fiber_length=0.05049201
        tendon_slack_length=0.31759 pennation_angle_at_optimal=0.3814289
      PathPoint P1: tibia_l (-0.007439464 -0.1055888 -0.009592994)
      PathPoint P2: calcn_l (0.005120604 0.031 0.005188048)
      FiberForceLengthCurve: strain_at_zero_force=0.1569032 strain_at_one_norm_force=0.8506533
          stiffness_at_low_force=0.2 stiffness_at_one_norm_force=2.882882 curviness=0.75
    Millard2012EquilibriumMuscle tfl_l: max_isometric_force=411.2066 optimal_fiber_length=0.1034846
        tendon_slack_length=0.4896423 pennation_angle_at_optimal=0.05235988
      PathPoint P1: pelvis (-0.02181493 0.01174008 -0.189172)
      PathPoint P2: femur_l (0.03395272 -0.1109834 -0.06894482)
      PathPoint P3: femur_l (0.01235694 -0.4517417 -0.03741729)
      PathPoint P4: tibia_l (0.01057187 -0.04726136 -0.03386914)
      FiberForceLengthCurve: strain_at_zero_force=0.07118385 strain_at_one_norm_force=0.7197196
          stiffness_at_low_force=0.2 stiffness_at_one_norm_force=3.08387 curviness=0.75
    Millard2012EquilibriumMuscle tibant_l: max_isometric_force=1227.452 optimal_fiber_length=0.07859902
        tendon_slack_length=0.2767204 pennation_angle_at_optimal=0.1951828
      PathPoint P1: tibia_l (0.0150747 -0.1512363 -0.01585781)
      PathPoint P2: tibia_l (0.02456981 -0.2197077 -0.01252962)
      PathPoint P3: tibia_l (0.02280783 -0.4217788 0.01292118)
      PathPoint P4: calcn_l (0.135696 0.0178 0.02985575)
      FiberForceLengthCurve: strain_at_zero_force=0.1892237 strain_at_one_norm_force=0.7076768
          stiffness_at_low_force=0.2 stiffness_at_one_norm_force=3.85763 curviness=0.75
    Millard2012EquilibriumMuscle tibpost_l: max_isometric_force=1730.154 optimal_fiber_length=0.04325459
        tendon_slack_length=0.3212965 pennation_angle_at_optimal=0.2264891
      PathPoint P1: tibia_l (-0.004013395 -0.1503142 -0.01008243)
      PathPoint P2: tibia_l (-0.01605358 -0.4213177 0.01713035)
      PathPoint P3: calcn_l (0.04852936 0.0334 0.02799588)
      PathPoint P4: calcn_l (0.08984333 0.0159 0.02750644)
      FiberForceLengthCurve: strain_at_zero_force=-0.1916705 strain_at_one_norm_force=0.6862359
          stiffness_at_low_force=0.2 stiffness_at_one_norm_force=2.278147 curviness=0.75
    Millard2012EquilibriumMuscle vasint_l: max_isometric_force=1697.361 optimal_fiber_length=0.112611
        tendon_slack_length=0.2293166 pennation_angle_at_optimal=0.06309973
      PathPoint P1: femur_l (0.03349078 -0.2146052 -0.03580049)
      PathPoint P2: femur_l (0.03868763 -0.2324518 -0.03291335)
      PathPoint P3: patella_l (0.006698156 0.05543302 0.0006929127)
      PathPoint P4: patella_l (0.005774273 0.002852491 0.0004503933)
      PathPoint P5: tibia_l (0.03188202 -0.07285165 -0.0004209171)
      PathWrap: wrap_object=KnExt_at_fem_l method=hybrid
      FiberForceLengthCurve: strain_at_zero_force=0.1999153 strain_at_one_norm_force=0.8514363
          stiffness_at_low_force=0.2 stiffness_at_one_norm_force=3.06974 curviness=0.75
    Millard2012EquilibriumMuscle vaslat_l: max_isometric_force=5148.767 optimal_fiber_length=0.1128341
        tendon_slack_length=0.2504159 pennation_angle_at_optimal=0.2528673
      PathPoint P1: femur_l (0.005543302 -0.2067973 -0.04030442)
      PathPoint P2: femur_l (0.03106559 -0.2890031 -0.04723355)
      PathPoint P3: patella_l (0.011895 0.04885035 -0.01628345)
      PathPoint P4: patella_l (0.005774273 0.002852491 -0.008465084)
      PathPoint P5: tibia_l (0.03185265 -0.07305914 -0.005002061)
      PathWrap: wrap_object=KnExt_at_fem_l method=hybrid
      FiberForceLengthCurve: strain_at_zero_force=0.1999632 strain_at_one_norm_force=0.8928189
          stiffness_at_low_force=0.2 stiffness_at_one_norm_force=2.886604 curviness=0.75
    Millard2012EquilibriumMuscle vasmed_l: max_isometric_force=2747.823 optimal_fiber_length=0.1099997
        tendon_slack_length=0.2271633 pennation_angle_at_optimal=0.4222225
      PathPoint P1: femur_l (0.01616796 -0.2341249 -0.02171127)
      PathPoint P2: femur_l (0.04111282 -0.3088575 -0.001039369)
      PathPoint P3: patella_l (0.007275584 0.05139103 0.01963253)
      PathPoint P4: patella_l (0.005774273 0.002852491 0.009816264)
      PathPoint P5: tibia_l (0.03122617 -0.07327816 0.006636785)
      PathWrap: wrap_object=KnExt_at_fem_l method=hybrid
      FiberForceLengthCurve: strain_at_zero_force=0.1999354 strain_at_one_norm_force=0.8518332
          stiffness_at_low_force=0.2 stiffness_at_one_norm_force=3.067965 curviness=0.75
    CoordinateActuator pelvis_tilt_reserve: coordinate=pelvis_tilt optimal_force=100
    CoordinateActuator pelvis_list_reserve: coordinate=pelvis_list optimal_force=100
    CoordinateActuator pelvis_rotation_reserve: coordinate=pelvis_rotation optimal_force=100
    CoordinateActuator pelvis_tx_reserve: coordinate=pelvis_tx optimal_force=100
    CoordinateActuator pelvis_ty_reserve: coordinate=pelvis_ty optimal_force=100
    CoordinateActuator pelvis_tz_reserve: coordinate=pelvis_tz optimal_force=100
    CoordinateActuator hip_flexion_r_reserve: coordinate=hip_flexion_r optimal_force=1
    CoordinateActuator hip_adduction_r_reserve: coordinate=hip_adduction_r optimal_force=1
    CoordinateActuator hip_rotation_r_reserve: coordinate=hip_rotation_r optimal_force=1
    CoordinateActuator knee_angle_r_reserve: coordinate=knee_angle_r optimal_force=1
    CoordinateActuator ankle_angle_r_reserve: coordinate=ankle_angle_r optimal_force=1
    CoordinateActuator subtalar_angle_r_reserve: coordinate=subtalar_angle_r optimal_force=1
    CoordinateActuator hip_flexion_l_reserve: coordinate=hip_flexion_l optimal_force=1
    CoordinateActuator hip_adduction_l_reserve: coordinate=hip_adduction_l optimal_force=1
    CoordinateActuator hip_rotation_l_reserve: coordinate=hip_rotation_l optimal_force=1
    CoordinateActuator knee_angle_l_reserve: coordinate=knee_angle_l optimal_force=1
    CoordinateActuator ankle_angle_l_reserve: coordinate=ankle_angle_l optimal_force=1
    CoordinateActuator subtalar_angle_l_reserve: coordinate=subtalar_angle_l optimal_force=1
    CoordinateActuator lumbar_extension_reserve: coordinate=lumbar_extension optimal_force=100
    CoordinateActuator lumbar_bending_reserve: coordinate=lumbar_bending optimal_force=100
    CoordinateActuator lumbar_rotation_reserve: coordinate=lumbar_rotation optimal_force=100
    ObjectGroup right_leg: members=(addbrev_r addlong_r addmagDist_r addmagIsch_r addmagMid_r addmagProx_r bflh_r bfsh_r edl_r ehl_r fdl_r fhl_r gaslat_r gasmed_r glmax1_r glmax2_r glmax3_r glmed1_r glmed2_r glmed3_r glmin1_r glmin2_r glmin3_r grac_r iliacus_r perbrev_r perlong_r piri_r psoas_r recfem_r sart_r semimem_r semiten_r soleus_r tfl_r tibant_r tibpost_r vasint_r vaslat_r vasmed_r)
    ObjectGroup left_leg: members=(addbrev_l addlong_l addmagDist_l addmagIsch_l addmagMid_l addmagProx_l bflh_l bfsh_l edl_l ehl_l fdl_l fhl_l gaslat_l gasmed_l glmax1_l glmax2_l glmax3_l glmed1_l glmed2_l glmed3_l glmin1_l glmin2_l glmin3_l grac_l iliacus_l perbrev_l perlong_l piri_l psoas_l recfem_l sart_l semimem_l semiten_l soleus_l tfl_l tibant_l tibpost_l vasint_l vaslat_l vasmed_l)
    ObjectGroup hip_add_r: members=(addbrev_r addlong_r addmagDist_r addmagIsch_r addmagMid_r addmagProx_r bflh_r grac_r semimem_r semiten_r)
    ObjectGroup hip_abd_r: members=(glmax1_r glmed1_r glmed2_r glmed3_r glmin1_r glmin2_r glmin3_r piri_r sart_r tfl_r)
    ObjectGroup hip_flex_r: members=(addbrev_r addlong_r glmin1_r grac_r iliacus_r psoas_r recfem_r sart_r tfl_r)
    ObjectGroup hip_ext_r: members=(addlong_r addmagDist_r addmagIsch_r addmagMid_r addmagProx_r bflh_r glmax1_r glmax2_r glmax3_r glmed1_r glmed2_r glmed3_r glmin3_r semimem_r semiten_r)
    ObjectGroup hip_inrot_r: members=(glmed1_r glmed2_r glmed3_r glmin1_r iliacus_r psoas_r tfl_r)
    ObjectGroup hip_exrot_r: members=(glmin3_r piri_r)
    ObjectGroup knee_flex_r: members=(bflh_r bfsh_r gaslat_r gasmed_r grac_r sart_r semimem_r semiten_r)
    ObjectGroup knee_ext_r: members=(recfem_r vasint_r vaslat_r vasmed_r)
    ObjectGroup ankle_df_r: members=(edl_r ehl_r tibant_r)
    ObjectGroup ankle_pf_r: members=(fdl_r fhl_r gaslat_r gasmed_r perbrev_r perlong_r soleus_r tibpost_r)
    ObjectGroup everter_r: members=(edl_r perbrev_r perlong_r)
    ObjectGroup inverter_r: members=(ehl_r fdl_r fhl_r tibant_r tibpost_r)
    ObjectGroup hip_add_l: members=(addbrev_l addlong_l addmagDist_l addmagIsch_l addmagMid_l addmagProx_l bflh_l grac_l semimem_l semiten_l)
    ObjectGroup hip_abd_l: members=(glmax1_l glmed1_l glmed2_l glmed3_l glmin1_l glmin2_l glmin3_l piri_l sart_l tfl_l)
    ObjectGroup hip_flex_l: members=(addbrev_l addlong_l glmin1_l grac_l iliacus_l psoas_l recfem_l sart_l tfl_l)
    ObjectGroup hip_ext_l: members=(addlong_l addmagDist_l addmagIsch_l addmagMid_l addmagProx_l bflh_l glmax1_l glmax2_l glmax3_l glmed1_l glmed2_l glmed3_l glmin3_l semimem_l semiten_l)
    ObjectGroup hip_exrot_l: members=(glmin3_l piri_l)
    ObjectGroup hip_inrot_l: members=(glmed1_l glmed2_l glmed3_l glmin1_l iliacus_l psoas_l tfl_l)
    ObjectGroup knee_flex_l: members=(bflh_l bfsh_l gaslat_l gasmed_l grac_l sart_l semimem_l semiten_l)
    ObjectGroup knee_ext_l: members=(recfem_l vasint_l vaslat_l vasmed_l)
    ObjectGroup ankle_df_l: members=(edl_l ehl_l tibant_l)
    ObjectGroup ankle_pf_l: members=(fdl_l fhl_l gaslat_l gasmed_l perbrev_l perlong_l soleus_l tibpost_l)
    ObjectGroup everter_l: members=(edl_l perbrev_l perlong_l)
    ObjectGroup inverter_l: members=(ehl_l fdl_l fhl_l tibant_l tibpost_l)
  MarkerSet:
    Marker C7: torso (-0.09658461 0.433562 0.00338686)
    Marker R_Shoulder: torso (-0.005821761 0.3894356 0.1772524)
    Marker L_Shoulder: torso (-0.008361262 0.3829984 -0.1783438)
    Marker R_Sternum: torso (0.06096595 0.3944287 0.02998224)
    Marker L_Sternum: torso (0.06265217 0.3933486 -0.02431893)
    Marker r.ASIS: pelvis (0.03179965 0.007472991 0.1139882)
    Marker L.ASIS: pelvis (0.02668037 0.01654453 -0.117039)
    Marker r.PSIS: pelvis (-0.1656721 0.03361919 0.06554774)
    Marker L.PSIS: pelvis (-0.1714213 0.03365846 -0.04979031)
    Marker R_HJC: femur_r (-0.001661528 0.004155334 -0.002157233)
    Marker L_HJC: femur_l (0.008689213 0.002227632 -0.002505096)
    Marker r_thigh1: femur_r (0.09299034 -0.1440507 0.06740005)
    Marker r_thigh2: femur_r (0.08615 -0.2497274 0.06613566)
    Marker r_thigh3: femur_r (0.02575402 -0.2800549 0.09156297)
    Marker r_thigh4: femur_r (-0.01841749 -0.1404608 0.1001675)
    Marker r_thigh5: femur_r (-0.03054148 -0.2503242 0.08349087)
    Marker r_knee: femur_r (0.001640412 -0.4327807 0.06481253)
    Marker r_mknee: femur_r (0.008479215 -0.4451698 -0.06121022)
    Marker r_shank_antsup: tibia_r (0.02239766 -0.08179199 0.06990322)
    Marker r_sh2: tibia_r (0.01538538 -0.1961759 0.07824804)
    Marker r_sh3: tibia_r (-0.06322697 -0.06994314 0.08160619)
    Marker r_sh4: tibia_r (-0.07444973 -0.1856578 0.08634553)
    Marker r_ankle: tibia_r (-0.02343268 -0.4581973 0.04556129)
    Marker r_mankle: tibia_r (-0.005273249 -0.4454284 -0.04538591)
    Marker r_toe: calcn_r (0.2108943 0.01365353 0.01130834)
    Marker r_5meta: calcn_r (0.1749134 -0.009666961 0.07274465)
    Marker r_calc: calcn_r (-0.03597153 0.02258105 -0.008982081)
    Marker L_thigh1: femur_l (0.06751723 -0.1675646 -0.08866065)
    Marker L_thigh2: femur_l (0.06365734 -0.2986426 -0.09354388)
    Marker L_thigh3: femur_l (-0.03593002 -0.1522454 -0.08456823)
    Marker L_thigh4: femur_l (-0.05067138 -0.2886325 -0.07138695)
    Marker L_knee: femur_l (0.003789981 -0.4430777 -0.06769994)
    Marker L_mknee: femur_l (0.01618327 -0.4506104 0.05859606)
    Marker L_ankle: tibia_l (-0.01523812 -0.4502288 -0.04676117)
    Marker L_shank_antsup: tibia_l (0.02750647 -0.06543245 -0.07041399)
    Marker L_sh2: tibia_l (0.02573252 -0.1839957 -0.08139676)
    Marker L_sh3: tibia_l (-0.05483404 -0.06055832 -0.08229997)
    Marker L_mankle: tibia_l (-0.001757304 -0.427771 0.04223456)
    Marker L_toe: calcn_l (0.2150638 0.01072718 -0.007172367)
    Marker L_calc: calcn_l (-0.03269466 0.01382196 0.001350802)
    Marker L_5meta: calcn_l (0.1751862 -0.01161628 -0.0695987)
    Marker midASIS: pelvis (0.02923998 0.01200879 -0.001525492)
    Marker R_5meta_proj: calcn_r (0.1743965 -0.06101086 0.07496689)
    Marker L_5meta_proj: calcn_l (0.1717021 -0.06403056 -0.07364043)
    Marker R_toe_proj: calcn_r (0.2101126 -0.06398028 0.01466845)
    Marker L_toe_proj: calcn_l (0.2096186 -0.07118932 -0.01348906)
    Marker L_AJC: tibia_l (-0.006852138 -0.4409139 -0.007341577) fixed=true
    Marker L_AJC_proj: talus_l (-0.01303896 -0.1034212 0.003083738)
    Marker L_KJC: femur_l (0.01097112 -0.4489531 0) fixed=true
    Marker R_AJC: tibia_r (-0.006914693 -0.4554304 0.0074086) fixed=true
    Marker R_AJC_proj: talus_r (0.001308071 -0.1052224 0.003193911)
    Marker R_KJC: femur_r (0.005059688 -0.4389752 0.001801177)
    Marker midHJC: pelvis (-0.05791351 -0.07907671 -0.001879995)
    Marker midPelvis: pelvis (-0.06965352 0.02282386 0.003176714)
    Marker midPSIS: pelvis (-0.1685466 0.03363901 0.007878714)
